# OpenSim document version 40500
CMCTool subject01_walk1_weak20:
  model_file: ../03_projectGait2392_weakness/subject01_simbody_weak20.osim
  replace_force_set: false
  force_set_files: gait2392_CMC_Actuators.xml
  results_directory: ../03_projectGait2392_weakness/Results_CMC_weak20_newik
  output_precision: 20
  initial_time: 0.53
  final_time: 2
  solve_for_equilibrium_for_auxiliary_states: true
  maximum_number_of_integrator_steps: 30000
  maximum_integrator_step_size: 1
  minimum_integrator_step_size: 1e-8
  integrator_error_tolerance: 1e-6
  external_loads_file: subject01_walk1_grf.xml
  desired_kinematics_file: ../03_projectGait2392_weakness/subject01_walk1_ik_weak20.mot
  task_set_file: gait2392_CMC_Tasks.xml
  constraints_file: gait2392_CMC_ControlConstraints.xml
  lowpass_cutoff_frequency: 6
  cmc_time_window: 0.01
  use_fast_optimization_target: true
  optimizer_algorithm: ipopt
  optimizer_max_iterations: 2000
  optimizer_print_level: 0
  use_verbose_printing: false
  AnalysisSet Analyses:
    Kinematics: coordinates=all start_time=0.53 end_time=2 step_interval=10 in_degrees=true
    Actuation: start_time=0.53 end_time=2 step_interval=10 in_degrees=true
