# OpenSim document version 20302
# RECONSTRUCTED: the original Setup_CMC_weak30_newik.xml was not preserved.
# Derived from Setup_CMC_weak50_newik.xml with weak50 -> weak30.
# initial_time (0.56 s) taken from the first row of the original output
# Results_CMC_weak30_newik/subject01_walk1_weak30_Actuation_force.sto.
CMCTool subject01_walk1_weak30:
  model_file: ../03_projectGait2392_weakness/subject01_simbody_weak30.osim
  replace_force_set: false
  force_set_files: gait2392_CMC_Actuators.xml
  results_directory: ../03_projectGait2392_weakness/Results_CMC_weak30_newik
  output_precision: 20
  initial_time: 0.56
  final_time: 2
  solve_for_equilibrium_for_auxiliary_states: true
  maximum_number_of_integrator_steps: 30000
  maximum_integrator_step_size: 1
  minimum_integrator_step_size: 0.00000001
  integrator_error_tolerance: 0.000001
  external_loads_file: subject01_walk1_grf.xml
  desired_kinematics_file: ../03_projectGait2392_weakness/subject01_walk1_ik_weak30.mot
  task_set_file: gait2392_CMC_Tasks.xml
  constraints_file: gait2392_CMC_ControlConstraints.xml
  initial_states_file: ../02_NORMAL/OutputReference/ResultsCMC/subject01_walk1_states.sto
  lowpass_cutoff_frequency: 6
  cmc_time_window: 0.01
  use_curvature_filter: false
  use_fast_optimization_target: true
  optimizer_algorithm: ipopt
  optimizer_derivative_dx: 1
  optimizer_convergence_criterion: 0.1
  optimizer_max_iterations: 2000
  optimizer_print_level: 0
  use_verbose_printing: false
  AnalysisSet Analyses:
    Kinematics: start_time=-infinity end_time=infinity step_interval=10 in_degrees=true coordinates=all
    Actuation: start_time=-infinity end_time=infinity step_interval=10 in_degrees=true
