# OpenSim document version 20302
ForwardTool subject01_walk1_normal:
  model_file: subject01_simbody_adjusted.osim
  replace_force_set: false
  force_set_files: gait2392_CMC_Actuators.xml
  results_directory: ../02_NORMAL/05_FD_NORMAL/Results
  output_precision: 20
  initial_time: 0.53
  final_time: 1.99
  solve_for_equilibrium_for_auxiliary_states: false
  maximum_number_of_integrator_steps: 30000
  maximum_integrator_step_size: 1
  minimum_integrator_step_size: 0.000001
  integrator_error_tolerance: 0.00005
  external_loads_file: subject01_walk1_grf.xml
  states_file: ../02_NORMAL/OutputReference/ResultsCMC/subject01_walk1_states.sto
  use_specified_dt: false
  AnalysisSet Analyses:
    Kinematics: start_time=0.53 end_time=1.99 step_interval=10 in_degrees=true coordinates=all
    Actuation: start_time=0.53 end_time=1.99 step_interval=10 in_degrees=true
    BodyKinematics: start_time=0.53 end_time=1.99 step_interval=10 in_degrees=true bodies=all
        express_results_in_body_local_frame=false
  ControllerSet Controllers:
    ControlSetController: controls_file=../02_NORMAL/OutputReference/ResultsCMC/subject01_walk1_controls.xml
    CorrectionController: kp=16 kv=8
