# OpenSim document version 40500
ForwardTool subject01_walk1_weak50_noknee25:
  model_file: ../03_projectGait2392_weakness/subject01_simbody_weak50.osim
  replace_force_set: false
  force_set_files: gait2392_CMC_Actuators.xml
  results_directory: ../03_projectGait2392_weakness/Results_Forward_weak50_noknee25
  output_precision: 20
  initial_time: 0.53
  final_time: 1.99
  solve_for_equilibrium_for_auxiliary_states: false
  maximum_number_of_integrator_steps: 30000
  maximum_integrator_step_size: 1
  minimum_integrator_step_size: 1e-6
  integrator_error_tolerance: 5e-5
  external_loads_file: subject01_walk1_grf.xml
  states_file: ../03_projectGait2392_weakness/Results_CMC_weak50_noknee25/subject01_walk1_weak50_states.sto
  use_specified_dt: false
  AnalysisSet Analyses:
    Kinematics: coordinates=all start_time=0.53 end_time=1.99 step_interval=10 in_degrees=true
    Actuation: start_time=0.53 end_time=1.99 step_interval=10 in_degrees=true
    BodyKinematics: start_time=0.53 end_time=1.99 step_interval=10 in_degrees=true bodies=all
        express_results_in_body_local_frame=false
  ControllerSet Controllers:
    ControlSetController: controls_file=../03_projectGait2392_weakness/Results_CMC_weak50_noknee25/subject01_walk1_weak50_controls.xml
    CorrectionController: kp=16 kv=8
