# OpenSim document version 40500
MocoStudy:
  MocoProblem problem:
    MocoPhase phases:
      ModelProcessor model:
        model: Model subject01_NORMAL:
          gravity: 0 -9.80665 0
          length_units: meters
          force_units: N
          credits:
            Delp S.L., Loan J.P., Hoy M.G., Zajac F.E., Topp E.L., Rosen J.M., Thelen D.G., Anderson F.C., Seth A. Notes: 3D, 23 DOF gait model created by D.G. Thelen, Univ. of Wisconsin-Madison, and Ajay Seth, Frank C. Anderson, and Scott L. Delp, Stanford University. Lower extremity joint defintions based on Delp et al. (1990). Low back joint and anthropometry based on Anderson and Pandy (1999, 2001). Planar knee model of Yamaguchi and Zajac (1989). Seth replaced tibia translation constraints with a CustomJoint for the knee and removed the patella to eliminate all kinematic constraints; insertions of the quadrucepts are handled with moving points in the tibia frame as defined by Delp 1990. License: Creative Commons (CCBY 3.0). You are free to distribute, remix, tweak, and build upon this work, even commercially, as long as you credit us for the original creation. http://creativecommons.org/licenses/by/3.0/ More Information: http://simtk-confluence.stanford.edu:8080/display/OpenSim/Gait+2392+and+2354+Models
          publications:
            Delp, S.L., Loan, J.P., Hoy, M.G., Zajac, F.E., Topp E.L., Rosen, J.M.: An interactive graphics-based model of the lower extremity to study orthopaedic surgical procedures, IEEE Transactions on Biomedical Engineering, vol. 37, pp. 757-767, 1990. Yamaguchi G.T., Zajac F.E.: A planar model of the knee joint to characterize the knee extensor mechanism." J . Biomecl7. vol. 21. pp. 1-10. 1989. Anderson F.C., Pandy M.G.: A dynamic optimization solution for vertical jumping in three dimensions. Computer Methods in Biomechanics and Biomedical Engineering 2:201-231, 1999. Anderson F.C., Pandy M.G.: Dynamic optimization of human walking. Journal of Biomechanical Engineering 123:381-390, 2001.
          PositionMotion position_motion:
            FunctionSet functions:
              GCVSpline [values shared by the 23 below unless stated]: half_order=3 error_variance=0
                  x=(0 0.017 0.033 0.05 0.067 0.083 0.1 0.117 0.133 0.15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)
                  weights=(1 1 1 1 1 1 1 1 1 1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)
              GCVSpline /jointset/ground_pelvis/pelvis_tilt: y=(0.1704509 0.1686356 0.1633136 0.1561208 0.1566505 0.1522974 0.1597427 0.1659525 0.1627334 0.1536732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)
                  coefficients=(-0.1781094 0.03158001 0.1664129 0.1485064 0.16525 0.1426451 0.1633796 0.1670508 0.1671888 0.1463946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)
              GCVSpline /jointset/ground_pelvis/pelvis_list: y=(-0.1078299 -0.1022558 -0.1003848 -0.09865384 -0.09428578 -0.08731107 -0.07425814 -0.06244346 -0.050239 -0.03408675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)
                  coefficients=(-0.7871458 -0.0132571 -0.100154 -0.09998125 -0.09399799 -0.09044121 -0.07206237 -0.0638369 -0.05037163 -0.03541375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)
              GCVSpline /jointset/ground_pelvis/pelvis_rotation: y=(-0.05880679 -0.06058907 -0.06066372 -0.06499544 -0.06449581 -0.06238335 -0.06438949 -0.05641258 -0.05623765 -0.05537819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)
                  coefficients=(1.097862 -0.0536999 -0.05745697 -0.06752307 -0.06655778 -0.05654859 -0.07349053 -0.0492097 -0.05810253 -0.05859328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)
              GCVSpline /jointset/ground_pelvis/pelvis_tx: y=(0.6140126 0.6151376 0.6165689 0.6179549 0.6205197 0.6225413 0.6260174 0.6290248 0.630731 0.6310039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)
                  coefficients=(0.2089455 -0.02742158 0.6171421 0.6168854 0.6214794 0.6213923 0.6267587 0.6286886 0.6321718 0.6291803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)
              GCVSpline /jointset/ground_pelvis/pelvis_ty: y=(0.9743894 0.972792 0.9711825 0.9699398 0.9695801 0.9699652 0.9715351 0.9736381 0.9753046 0.9767138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)
                  coefficients=(-0.0501063 0.02217586 0.9710337 0.9696309 0.9695298 0.969533 0.9714652 0.9736281 0.9756982 0.9761133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)
              GCVSpline /jointset/ground_pelvis/pelvis_tz: y=(0.03755202 0.03516331 0.03280264 0.03052388 0.02780695 0.0249455 0.02150393 0.01701854 0.01341611 0.00908169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)
                  coefficients=(-0.07366203 0.03311063 0.03253369 0.0307436 0.02799564 0.02470925 0.0223097 0.01628606 0.01401344 0.008618722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)
              GCVSpline /jointset/hip_r/hip_flexion_r: y=(-0.499032 -0.5006175 -0.4974633 -0.4856373 -0.4799761 -0.458698 -0.4432212 -0.4190656 -0.3680641 -0.2989446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)
                  coefficients=(-0.5457278 0.05878424 -0.5050622 -0.4745594 -0.4953714 -0.448001 -0.4475368 -0.42808 -0.3753887 -0.2838711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)
              GCVSpline /jointset/hip_r/hip_adduction_r: y=(0.0729254 0.05941738 0.05077456 0.04108055 0.02965324 0.0174151 -0.00645615 -0.02564274 -0.04852533 -0.07731286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)
                  coefficients=(1.019051 0.09102847 0.05065245 0.04286179 0.02691707 0.02518442 -0.01318281 -0.02058877 -0.04899015 -0.0771636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)
              GCVSpline /jointset/hip_r/hip_rotation_r: y=(0.008182719 -0.004890676 -0.0109246 -0.01074436 -0.01700155 -0.02333686 -0.03449266 -0.05711891 -0.07326869 -0.09105626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)
                  coefficients=(0.6261994 0.1141193 -0.0152204 -0.005860245 -0.01840325 -0.02349039 -0.02770204 -0.06191428 -0.07239651 -0.08835345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)
              GCVSpline /jointset/hip_l/hip_flexion_l: y=(0.2895655 0.2984569 0.3122505 0.3269986 0.3320893 0.3337838 0.3195088 0.3028475 0.2908555 0.2792096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)
                  coefficients=(0.9306013 -0.1656295 0.3107682 0.333371 0.3275548 0.3432536 0.316592 0.3042211 0.2860739 0.2893903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)
              GCVSpline /jointset/hip_l/hip_adduction_l: y=(-0.1600609 -0.149637 -0.1439393 -0.1409113 -0.1345366 -0.1227351 -0.1080844 -0.0911142 -0.07629856 -0.05334651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)
                  coefficients=(-0.74377 -0.07367115 -0.1425968 -0.1417946 -0.1374421 -0.1214835 -0.110446 -0.08862203 -0.07988547 -0.05368942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)
              GCVSpline /jointset/hip_l/hip_rotation_l: y=(-0.1657173 -0.1501315 -0.1463313 -0.14543 -0.1382621 -0.1209478 -0.1259999 -0.1223139 -0.1272846 -0.1284216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)
                  coefficients=(-2.893078 0.009874437 -0.1472913 -0.1427817 -0.152112 -0.09994109 -0.1420322 -0.1097833 -0.135264 -0.1243817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)
              GCVSpline /jointset/back/lumbar_extension: y=(-0.4697691 -0.4659369 -0.4578323 -0.4485985 -0.4442416 -0.4366552 -0.4389644 -0.4403773 -0.434026 -0.4227238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)
                  coefficients=(0.743249 -0.09373775 -0.4592723 -0.4436154 -0.4506713 -0.4287871 -0.4417448 -0.4416512 -0.4373255 -0.417113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)
              GCVSpline /jointset/back/lumbar_bending: y=(0.08611591 0.07609055 0.07079469 0.06348792 0.05517697 0.04462426 0.02741562 0.01610948 0.00181926 -0.01345013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)
                  coefficients=(1.295955 0.0310304 0.0719412 0.06366783 0.05470128 0.04933373 0.02124879 0.02126009 -0.001133714 -0.01117401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)
              GCVSpline /jointset/back/lumbar_rotation: y=(0.05022659 0.04755029 0.04561195 0.04191104 0.03687502 0.03358127 0.02923603 0.01466057 0.006582779 -1.161778e-5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)
                  coefficients=(0.2988584 0.01125159 0.0462738 0.04224201 0.03690737 0.03159602 0.0356082 0.01139615 0.002884879 0.01116671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)
              GCVSpline /jointset/knee_r/knee_angle_r: y=(-0.1098994 -0.141483 -0.1735164 -0.2167758 -0.2635915 -0.3253255 -0.3974465 -0.4782959 -0.5804708 -0.6944931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)
                  coefficients=(0.6840261 0.3232691 -0.1686317 -0.2211447 -0.252348 -0.3277439 -0.397774 -0.4647523 -0.5812164 -0.7049817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)
              GCVSpline /jointset/knee_l/knee_angle_l: y=(-0.1437822 -0.1810149 -0.225474 -0.2710404 -0.3182619 -0.3492141 -0.3834735 -0.4072985 -0.4217606 -0.4213595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)
                  coefficients=(-3.335951 0.6625339 -0.2312772 -0.2643884 -0.3287265 -0.3423192 -0.3914003 -0.4047794 -0.4296284 -0.4209324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)
              GCVSpline /jointset/ankle_r/ankle_angle_r: y=(0.1092726 0.111845 0.1050934 0.0946691 0.07357771 0.04777973 0.01347534 -0.03597493 -0.08948104 -0.1519996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)
                  coefficients=(-2.608017 0.1442905 0.1032731 0.09943738 0.07498394 0.04753148 0.01953859 -0.03436685 -0.08915566 -0.1503481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)
              GCVSpline /jointset/ankle_l/ankle_angle_l: y=(-0.05889187 -0.08357278 -0.1039521 -0.1215823 -0.1266726 -0.1334969 -0.1228692 -0.1110175 -0.09643829 -0.08453858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)
                  coefficients=(1.202289 0.2090475 -0.1021455 -0.1311606 -0.1170799 -0.147098 -0.1160585 -0.1175485 -0.09014205 -0.09046215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)
              GCVSpline /jointset/subtalar_r/subtalar_angle_r: y=(0.1775375 0.2021653 0.2198571 0.2289287 0.2393982 0.2436197 0.2538607 0.251142 0.2358745 0.2087871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)
                  coefficients=(-0.02491458 -0.2909918 0.2263061 0.2232581 0.2468162 0.2357594 0.2614422 0.2535824 0.2377377 0.2129153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)
              GCVSpline /jointset/subtalar_l/subtalar_angle_l: y=(0.1986175 0.1790515 0.1683271 0.1574594 0.1499285 0.1293935 0.1306198 0.1346592 0.1399039 0.1326852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)
                  coefficients=(2.847253 0.0383332 0.1724588 0.1483495 0.1668561 0.1098773 0.1395608 0.1262615 0.1518341 0.1232604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)
              GCVSpline /jointset/mtp_r/mtp_angle_r: y=(0 0 0 0 0 0 0 0 0 0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)
                  coefficients=(0 0 0 0 0 0 0 0 0 0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)
              GCVSpline /jointset/mtp_l/mtp_angle_l: y=(0 0 0 0 0 0 0 0 0 0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)
                  coefficients=(0 0 0 0 0 0 0 0 0 0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)
          Ground: meshes=treadmill.vtp
          BodySet:
            Body pelvis: mass=11.37517 [kg] mass_center=(0.02755726 0 0.1)
                inertia=(0.1042479 0.08832677 0.0587155 0 0 0) meshes=(sacrum.vtp pelvis.vtp l_pelvis.vtp)
            Body femur_r: mass=8.984038 mass_center=(0 -0.1950308 0) inertia=(0.1702207 0.04462096 0.1795009 0 0 0)
                meshes=femur_r.vtp
            Body tibia_r: mass=3.581001 mass_center=(0 -0.1845572 0) inertia=(0.04756937 0.004813567 0.04823005 0 0 0)
                meshes=(tibia_r.vtp fibula.vtp)
            Body talus_r: mass=0.09658802 mass_center=(0 0 0) inertia=(0.001198895 0.001198895 0.001198895 0 0 0)
                meshes=talus.vtp
            Body calcn_r: mass=1.20735 mass_center=(0.1027076 0.03081229 0)
                inertia=(0.00142645 0.003973683 0.004177462 0 0 0) meshes=foot.vtp
            Body toes_r: mass=0.2092097 mass_center=(0.03553684 0.006162458 -0.01797383)
                inertia=(0.0001018893 0.0002037786 0.0001018893 0 0 0) meshes=bofoot.vtp
            Body femur_l: mass=8.984038 mass_center=(0 -0.1950308 0) inertia=(0.1702207 0.04462096 0.1795009 0 0 0)
                meshes=femur_l.vtp
            Body tibia_l: mass=3.581001 mass_center=(0 -0.1845572 0) inertia=(0.04756937 0.004813567 0.04823005 0 0 0)
                meshes=(tibia_l.vtp l_fibula.vtp)
            Body talus_l: mass=0.09658802 mass_center=(0 0 0) inertia=(0.001198895 0.001198895 0.001198895 0 0 0)
                meshes=l_talus.vtp
            Body calcn_l: mass=1.20735 mass_center=(0.1027076 0.03081229 0)
                inertia=(0.00142645 0.003973683 0.004177462 0 0 0) meshes=l_foot.vtp
            Body toes_l: mass=0.2092097 mass_center=(0.03553684 0.006162458 0.01797383)
                inertia=(0.0001018893 0.0002037786 0.0001018893 0 0 0) meshes=l_bofoot.vtp
            Body torso: mass=33.06845 mass_center=(-0.03239305 0.3455259 0) inertia=(1.660463 0.8507833 1.611927 0 0 0)
                meshes=(hat_spine.vtp hat_jaw.vtp hat_skull.vtp hat_ribs.vtp)
          JointSet:
            CustomJoint ground_pelvis: socket_parent_frame=ground_offset socket_child_frame=pelvis_offset
              Coordinate pelvis_tilt: default_value=0 range=(-1.570796 1.570796) clamped=false
              Coordinate pelvis_list: default_value=0 range=(-1.570796 1.570796) clamped=false
              Coordinate pelvis_rotation: default_value=0 range=(-1.570796 1.570796) clamped=false
              Coordinate pelvis_tx: default_value=0 range=(-5 5) clamped=false
              Coordinate pelvis_ty: default_value=0.95 range=(-1 2) clamped=false
              Coordinate pelvis_tz: default_value=0 range=(-3 3) clamped=false
              PhysicalOffsetFrame ground_offset: socket_parent=/ground translation=(0 0 0) [meters]
              PhysicalOffsetFrame pelvis_offset: socket_parent=/bodyset/pelvis translation=(0 0 0)
              SpatialTransform:
                TransformAxis rotation1: coordinates=pelvis_tilt axis=(0 0 1) LinearFunction(coefficients=1 0)
                TransformAxis rotation2: coordinates=pelvis_list axis=(1 0 0) LinearFunction(coefficients=1 0)
                TransformAxis rotation3: coordinates=pelvis_rotation axis=(0 1 0) LinearFunction(coefficients=1 0)
                TransformAxis translation1: coordinates=pelvis_tx axis=(1 0 0) LinearFunction(coefficients=1 0)
                TransformAxis translation2: coordinates=pelvis_ty axis=(0 1 0) LinearFunction(coefficients=1 0)
                TransformAxis translation3: coordinates=pelvis_tz axis=(0 0 1) LinearFunction(coefficients=1 0)
            CustomJoint hip_r: socket_parent_frame=pelvis_offset socket_child_frame=femur_r_offset
              Coordinate hip_flexion_r: default_value=0 range=(-2.094395 2.094395) clamped=false
              Coordinate hip_adduction_r: default_value=0 range=(-2.094395 2.094395) clamped=false
              Coordinate hip_rotation_r: default_value=0 range=(-2.094395 2.094395) clamped=false
              PhysicalOffsetFrame pelvis_offset: socket_parent=/bodyset/pelvis
                  translation=(-0.07244274 -0.06772935 0.08555826)
              PhysicalOffsetFrame femur_r_offset: socket_parent=/bodyset/femur_r translation=(0 0 0)
              SpatialTransform: axes_held_at_zero=(translation1 translation2 translation3)
                TransformAxis rotation1: coordinates=hip_flexion_r axis=(0 0 1) LinearFunction(coefficients=1 0)
                TransformAxis rotation2: coordinates=hip_adduction_r axis=(1 0 0) LinearFunction(coefficients=1 0)
                TransformAxis rotation3: coordinates=hip_rotation_r axis=(0 1 0) LinearFunction(coefficients=1 0)
            CustomJoint knee_r: socket_parent_frame=femur_r_offset socket_child_frame=tibia_r_offset
              Coordinate knee_angle_r: default_value=0 range=(-2.094395 0.1745329) clamped=false
              PhysicalOffsetFrame femur_r_offset: socket_parent=/bodyset/femur_r translation=(0 0 0)
              PhysicalOffsetFrame tibia_r_offset: socket_parent=/bodyset/tibia_r translation=(0 0 0)
              SpatialTransform: axes_held_at_zero=(rotation2 rotation3 translation3)
                TransformAxis rotation1: coordinates=knee_angle_r axis=(0 0 1) LinearFunction(coefficients=1 0)
                TransformAxis translation1: coordinates=knee_angle_r axis=(1 0 0)
                  MultiplierFunction: scale=1.14724
                    SimmSpline: x=(-2.0944 -1.74533 -1.39626 -1.0472 -0.698132 -0.349066 -0.174533 0.197344 0.337395 0.490178 1.52146 2.0944)
                        y=(-0.0032 0.00179 0.00411 0.0041 0.00212 -0.001 -0.0031 -0.005227 -0.005435 -0.005574 -0.005435 -0.00525)
                TransformAxis translation2: coordinates=knee_angle_r axis=(0 1 0)
                  MultiplierFunction: scale=1.14724
                    SimmSpline: x=(-2.0944 -1.22173 -0.523599 -0.349066 -0.174533 0.159149 2.0944)
                        y=(-0.4226 -0.4082 -0.399 -0.3976 -0.3966 -0.395264 -0.396)
            CustomJoint ankle_r: socket_parent_frame=tibia_r_offset socket_child_frame=talus_r_offset
              Coordinate ankle_angle_r: default_value=0 range=(-1.570796 1.570796) clamped=false
              PhysicalOffsetFrame tibia_r_offset: socket_parent=/bodyset/tibia_r translation=(0 -0.4250649 0)
              PhysicalOffsetFrame talus_r_offset: socket_parent=/bodyset/talus_r translation=(0 0 0)
              SpatialTransform: axes_held_at_zero=(rotation2 rotation3 translation1 translation2 translation3)
                TransformAxis rotation1: coordinates=ankle_angle_r axis=(-0.1050135 -0.1740224 0.9791263)
                    LinearFunction(coefficients=1 0)
            CustomJoint subtalar_r: socket_parent_frame=talus_r_offset socket_child_frame=calcn_r_offset
              Coordinate subtalar_angle_r: default_value=0 range=(-1.570796 1.570796) clamped=false
              PhysicalOffsetFrame talus_r_offset: socket_parent=/bodyset/talus_r
                  translation=(-0.05433526 -0.04673701 0.00882377)
              PhysicalOffsetFrame calcn_r_offset: socket_parent=/bodyset/calcn_r translation=(0 0 0)
              SpatialTransform: axes_held_at_zero=(rotation2 rotation3 translation1 translation2 translation3)
                TransformAxis rotation1: coordinates=subtalar_angle_r axis=(0.7871796 0.6047475 -0.1209495)
                    LinearFunction(coefficients=1 0)
            CustomJoint mtp_r: socket_parent_frame=calcn_r_offset socket_child_frame=toes_r_offset
              Coordinate mtp_angle_r: default_value=0 range=(-1.570796 1.570796) clamped=false
              PhysicalOffsetFrame calcn_r_offset: socket_parent=/bodyset/calcn_r
                  translation=(0.1836412 -0.002054153 0.001109242)
              PhysicalOffsetFrame toes_r_offset: socket_parent=/bodyset/toes_r translation=(0 0 0)
              SpatialTransform: axes_held_at_zero=(rotation2 rotation3 translation1 translation2 translation3)
                TransformAxis rotation1: coordinates=mtp_angle_r axis=(-0.5809544 0 0.8139361)
                    LinearFunction(coefficients=1 0)
            CustomJoint hip_l: socket_parent_frame=pelvis_offset socket_child_frame=femur_l_offset
              Coordinate hip_flexion_l: default_value=0 range=(-2.094395 2.094395) clamped=false
              Coordinate hip_adduction_l: default_value=0 range=(-2.094395 2.094395) clamped=false
              Coordinate hip_rotation_l: default_value=0 range=(-2.094395 2.094395) clamped=false
              PhysicalOffsetFrame pelvis_offset: socket_parent=/bodyset/pelvis
                  translation=(-0.07244274 -0.06772935 -0.08555826)
              PhysicalOffsetFrame femur_l_offset: socket_parent=/bodyset/femur_l translation=(0 0 0)
              SpatialTransform: axes_held_at_zero=(translation1 translation2 translation3)
                TransformAxis rotation1: coordinates=hip_flexion_l axis=(0 0 1) LinearFunction(coefficients=1 0)
                TransformAxis rotation2: coordinates=hip_adduction_l axis=(-1 0 0) LinearFunction(coefficients=1 0)
                TransformAxis rotation3: coordinates=hip_rotation_l axis=(0 -1 0) LinearFunction(coefficients=1 0)
            CustomJoint knee_l: socket_parent_frame=femur_l_offset socket_child_frame=tibia_l_offset
              Coordinate knee_angle_l: default_value=0 range=(-2.094395 0.1745329) clamped=false
              PhysicalOffsetFrame femur_l_offset: socket_parent=/bodyset/femur_l translation=(0 0 0)
              PhysicalOffsetFrame tibia_l_offset: socket_parent=/bodyset/tibia_l translation=(0 0 0)
              SpatialTransform: axes_held_at_zero=(rotation2 rotation3 translation3)
                TransformAxis rotation1: coordinates=knee_angle_l axis=(0 0 1) LinearFunction(coefficients=1 0)
                TransformAxis translation1: coordinates=knee_angle_l axis=(1 0 0)
                  MultiplierFunction: scale=1.14724
                    SimmSpline: x=(-2.0944 -1.74533 -1.39626 -1.0472 -0.698132 -0.349066 -0.174533 0.197344 0.337395 0.490178 1.52146 2.0944)
                        y=(-0.0032 0.00179 0.00411 0.0041 0.00212 -0.001 -0.0031 -0.005227 -0.005435 -0.005574 -0.005435 -0.00525)
                TransformAxis translation2: coordinates=knee_angle_l axis=(0 1 0)
                  MultiplierFunction: scale=1.14724
                    SimmSpline: x=(-2.0944 -1.22173 -0.523599 -0.349066 -0.174533 0.159149 2.0944)
                        y=(-0.4226 -0.4082 -0.399 -0.3976 -0.3966 -0.395264 -0.396)
            CustomJoint ankle_l: socket_parent_frame=tibia_l_offset socket_child_frame=talus_l_offset
              Coordinate ankle_angle_l: default_value=0 range=(-1.570796 1.570796) clamped=false
              PhysicalOffsetFrame tibia_l_offset: socket_parent=/bodyset/tibia_l translation=(0 -0.4250649 0)
              PhysicalOffsetFrame talus_l_offset: socket_parent=/bodyset/talus_l translation=(0 0 0)
              SpatialTransform: axes_held_at_zero=(rotation2 rotation3 translation1 translation2 translation3)
                TransformAxis rotation1: coordinates=ankle_angle_l axis=(0.1050135 0.1740224 0.9791263)
                    LinearFunction(coefficients=1 0)
            CustomJoint subtalar_l: socket_parent_frame=talus_l_offset socket_child_frame=calcn_l_offset
              Coordinate subtalar_angle_l: default_value=0 range=(-1.570796 1.570796) clamped=false
              PhysicalOffsetFrame talus_l_offset: socket_parent=/bodyset/talus_l
                  translation=(-0.05433526 -0.04673701 -0.00882377)
              PhysicalOffsetFrame calcn_l_offset: socket_parent=/bodyset/calcn_l translation=(0 0 0)
              SpatialTransform: axes_held_at_zero=(rotation2 rotation3 translation1 translation2 translation3)
                TransformAxis rotation1: coordinates=subtalar_angle_l axis=(-0.7871796 -0.6047475 -0.1209495)
                    LinearFunction(coefficients=1 0)
            CustomJoint mtp_l: socket_parent_frame=calcn_l_offset socket_child_frame=toes_l_offset
              Coordinate mtp_angle_l: default_value=0 range=(-1.570796 1.570796) clamped=false
              PhysicalOffsetFrame calcn_l_offset: socket_parent=/bodyset/calcn_l
                  translation=(0.1836412 -0.002054153 -0.001109242)
              PhysicalOffsetFrame toes_l_offset: socket_parent=/bodyset/toes_l translation=(0 0 0)
              SpatialTransform: axes_held_at_zero=(rotation2 rotation3 translation1 translation2 translation3)
                TransformAxis rotation1: coordinates=mtp_angle_l axis=(0.5809544 0 0.8139361)
                    LinearFunction(coefficients=1 0)
            CustomJoint back: socket_parent_frame=pelvis_offset socket_child_frame=torso_offset
              Coordinate lumbar_extension: default_value=0 range=(-1.570796 1.570796) clamped=false
              Coordinate lumbar_bending: default_value=0 range=(-1.570796 1.570796) clamped=false
              Coordinate lumbar_rotation: default_value=0 range=(-1.570796 1.570796) clamped=false
              PhysicalOffsetFrame pelvis_offset: socket_parent=/bodyset/pelvis translation=(-0.1031822 0.08350896 0)
              PhysicalOffsetFrame torso_offset: socket_parent=/bodyset/torso translation=(0 0 0)
              SpatialTransform: axes_held_at_zero=(translation1 translation2 translation3)
                TransformAxis rotation1: coordinates=lumbar_extension axis=(0 0 1) LinearFunction(coefficients=1 0)
                TransformAxis rotation2: coordinates=lumbar_bending axis=(1 0 0) LinearFunction(coefficients=1 0)
                TransformAxis rotation3: coordinates=lumbar_rotation axis=(0 1 0) LinearFunction(coefficients=1 0)
          ForceSet:
            DeGrooteFregly2016Muscle [values shared by the 92 below unless stated]: min_control=0.01 max_control=1
                max_contraction_velocity=10 ignore_tendon_compliance=true activation_time_constant=0.01
                deactivation_time_constant=0.04 default_activation=0.05 fiber_damping=0
                passive_fiber_strain_at_one_norm_force=0.6 tendon_strain_at_one_norm_force=0.033
                ignore_passive_fiber_force=true
            DeGrooteFregly2016Muscle glut_med1_r: max_isometric_force=819 optimal_fiber_length=0.05640925
                tendon_slack_length=0.08224152 pennation_angle_at_optimal=0.1396263 [radians]
              PathPoint P1: pelvis (-0.04180571 0.03114935 0.1238802)
              PathPoint P2: femur_r (-0.02500983 -0.01342271 0.06367182)
            DeGrooteFregly2016Muscle glut_med2_r: max_isometric_force=573 optimal_fiber_length=0.08913635
                tendon_slack_length=0.05590801 pennation_angle_at_optimal=0
              PathPoint P1: pelvis (-0.08760756 0.04559692 0.07848818)
              PathPoint P2: femur_r (-0.02959879 -0.006653992 0.06045955)
            DeGrooteFregly2016Muscle glut_med3_r: max_isometric_force=653 optimal_fiber_length=0.06853389
                tendon_slack_length=0.05622749 pennation_angle_at_optimal=0.3316126
              PathPoint P1: pelvis (-0.1253147 0.01075882 0.06639731)
              PathPoint P2: femur_r (-0.03544972 -0.005392028 0.05942703)
            DeGrooteFregly2016Muscle glut_min1_r: max_isometric_force=270 optimal_fiber_length=0.07329192
                tendon_slack_length=0.01724516 pennation_angle_at_optimal=0.1745329
              PathPoint P1: pelvis (-0.04785115 -0.008197199 0.108203)
              PathPoint P2: femur_r (-0.008260128 -0.0119313 0.06424544)
            DeGrooteFregly2016Muscle glut_min2_r: max_isometric_force=285 optimal_fiber_length=0.06066135
                tendon_slack_length=0.0281642 pennation_angle_at_optimal=0
              PathPoint P1: pelvis (-0.06486033 -0.006660224 0.1015428)
              PathPoint P2: femur_r (-0.0110135 -0.0119313 0.06424544)
            DeGrooteFregly2016Muscle glut_min3_r: max_isometric_force=323 optimal_fiber_length=0.04117832
                tendon_slack_length=0.05526564 pennation_angle_at_optimal=0.01745329
              PathPoint P1: pelvis (-0.0854558 -0.006455294 0.08771003)
              PathPoint P2: femur_r (-0.01548774 -0.009522092 0.0630982)
            DeGrooteFregly2016Muscle semimem_r: max_isometric_force=1288 optimal_fiber_length=0.09098493
                tendon_slack_length=0.4082949 pennation_angle_at_optimal=0.2617994
              PathPoint P1: pelvis (-0.1221383 -0.09987262 0.07327271)
              ConditionalPathPoint P2: tibia_r (-0.0344006 -0.03478612 -0.01869297)
                  socket_coordinate=/jointset/knee_r/knee_angle_r range=(-0.558505 0.174533) [radians]
              PathPoint P3: tibia_r (-0.02669012 -0.04716243 -0.0193454)
            DeGrooteFregly2016Muscle semiten_r: max_isometric_force=410 optimal_fiber_length=0.2252728
                tendon_slack_length=0.2863542 pennation_angle_at_optimal=0.08726646
              PathPoint P1: pelvis (-0.1294645 -0.1125885 0.0618786)
              ConditionalPathPoint P2: tibia_r (-0.04154762 -0.02826187 -0.02250867)
                  socket_coordinate=/jointset/knee_r/knee_angle_r range=(-0.331613 0.174533)
              PathPoint P3: tibia_r (-0.03283873 -0.05221378 -0.02261741)
              PathPoint P4: tibia_r (-0.01117031 -0.07374382 -0.02421881)
              PathPoint P5: tibia_r (0.002669012 -0.0945028 -0.01907849)
            DeGrooteFregly2016Muscle bifemlh_r: max_isometric_force=896 optimal_fiber_length=0.1236305
                tendon_slack_length=0.3697572 pennation_angle_at_optimal=0
              PathPoint P1: pelvis (-0.1290649 -0.1050983 0.07115168)
              PathPoint P2: tibia_r (-0.02975454 -0.03558683 0.02909223)
              PathPoint P3: tibia_r (-0.02313144 -0.05565384 0.03390634)
            DeGrooteFregly2016Muscle bifemsh_r: max_isometric_force=804 optimal_fiber_length=0.1914449
                tendon_slack_length=0.09848899 pennation_angle_at_optimal=0.4014257
              PathPoint P1: femur_r (0.0057362 -0.2421824 0.02684542)
              PathPoint P2: tibia_r (-0.02975454 -0.03558683 0.02909223)
              PathPoint P3: tibia_r (-0.02313144 -0.05565384 0.03390634)
            DeGrooteFregly2016Muscle sar_r: max_isometric_force=156 optimal_fiber_length=0.5742207
                tendon_slack_length=0.1104271 pennation_angle_at_optimal=0
              PathPoint P1: pelvis (-0.01567714 -0.001332045 0.1272615)
              PathPoint P2: femur_r (-0.00344172 -0.4093352 -0.0482988)
              PathPoint P3: tibia_r (-0.005535729 -0.04141911 -0.03944207)
              PathPoint P4: tibia_r (0.005931138 -0.058224 -0.03786043)
              PathPoint P5: tibia_r (0.02402111 -0.08303593 -0.02491078)
            DeGrooteFregly2016Muscle add_long_r: max_isometric_force=627 optimal_fiber_length=0.1570092
                tendon_slack_length=0.1251523 pennation_angle_at_optimal=0.1047198
              PathPoint P1: pelvis (-0.03237893 -0.08566073 0.01731658)
              PathPoint P2: femur_r (0.0057362 -0.2421824 0.02684542)
            DeGrooteFregly2016Muscle add_brev_r: max_isometric_force=429 optimal_fiber_length=0.1490394
                tendon_slack_length=0.02241194 pennation_angle_at_optimal=0
              PathPoint P1: pelvis (-0.06014695 -0.09375546 0.01680426)
              PathPoint P2: femur_r (0.001032516 -0.1372099 0.03372886)
            DeGrooteFregly2016Muscle add_mag1_r: max_isometric_force=381 optimal_fiber_length=0.09866341
                tendon_slack_length=0.06804373 pennation_angle_at_optimal=0.08726646
              PathPoint P1: pelvis (-0.07500437 -0.1202939 0.02612857)
              PathPoint P2: femur_r (-0.00516258 -0.1389308 0.03889144)
            DeGrooteFregly2016Muscle add_mag2_r: max_isometric_force=343 optimal_fiber_length=0.1409884
                tendon_slack_length=0.1398232 pennation_angle_at_optimal=0.05235988
              PathPoint P1: pelvis (-0.0851484 -0.1221383 0.03155921)
              PathPoint P2: femur_r (0.006195096 -0.2621443 0.02604235)
            DeGrooteFregly2016Muscle add_mag3_r: max_isometric_force=488 optimal_fiber_length=0.1522592
                tendon_slack_length=0.2894088 pennation_angle_at_optimal=0.08726646
              PathPoint P1: pelvis (-0.1138181 -0.1169433 0.0500234)
              PathPoint P2: femur_r (0.00803068 -0.440196 -0.03051658)
            DeGrooteFregly2016Muscle tfl_r: max_isometric_force=233 optimal_fiber_length=0.106039
                tendon_slack_length=0.4743849 pennation_angle_at_optimal=0.05235988
              PathPoint P1: pelvis (-0.03186661 0.02192751 0.127159)
              PathPoint P2: femur_r (0.03372886 -0.1141504 0.06849023)
              PathPoint P3: femur_r (0.006195096 -0.4645175 0.04095647)
              PathPoint P4: tibia_r (0.005931138 -0.04814107 0.02935913)
            DeGrooteFregly2016Muscle pect_r: max_isometric_force=266 optimal_fiber_length=0.1116577
                tendon_slack_length=0.03684704 pennation_angle_at_optimal=0
              PathPoint P1: pelvis (-0.04416241 -0.07869311 0.04621171)
              PathPoint P2: femur_r (-0.01399633 -0.09430313 0.02902517)
            DeGrooteFregly2016Muscle grac_r: max_isometric_force=162 optimal_fiber_length=0.396583
                tendon_slack_length=0.1419587 pennation_angle_at_optimal=0.05235988
              PathPoint P1: pelvis (-0.07583433 -0.1216259 0.02862872)
              ConditionalPathPoint P2: tibia_r (-0.02626506 -0.03153388 -0.03730686)
                  socket_coordinate=/jointset/knee_r/knee_angle_r range=(-0.436332 0.174533)
              PathPoint P3: tibia_r (-0.019207 -0.05093859 -0.03538912)
              PathPoint P4: tibia_r (0.005931138 -0.08264052 -0.02253832)
            DeGrooteFregly2016Muscle glut_max1_r: max_isometric_force=573 optimal_fiber_length=0.1515936
                tendon_slack_length=0.1334451 pennation_angle_at_optimal=0.08726646
              PathPoint P1: pelvis (-0.1224457 0.06270857 0.07172549)
              PathPoint P2: pelvis (-0.1322823 0.00122958 0.09078398)
              PathPoint P3: femur_r (-0.05242887 -0.02845155 0.04497181)
              PathPoint P4: femur_r (-0.03177855 -0.06493378 0.05392028)
            DeGrooteFregly2016Muscle glut_max2_r: max_isometric_force=819 optimal_fiber_length=0.1594001
                tendon_slack_length=0.137713 pennation_angle_at_optimal=0
              PathPoint P1: pelvis (-0.1382253 0.01803384 0.05768779)
              PathPoint P2: pelvis (-0.1409918 -0.05328179 0.09365299)
              PathPoint P3: femur_r (-0.04887242 -0.06080372 0.03361413)
              PathPoint P4: femur_r (-0.01789694 -0.1165596 0.04806936)
            DeGrooteFregly2016Muscle glut_max3_r: max_isometric_force=552 optimal_fiber_length=0.1562935
                tendon_slack_length=0.1573788 pennation_angle_at_optimal=0.08726646
              PathPoint P1: pelvis (-0.1594355 -0.032174 0.005942969)
              PathPoint P2: pelvis (-0.156669 -0.1077932 0.04129339)
              PathPoint P3: femur_r (-0.03430248 -0.1194277 0.01548774)
              PathPoint P4: femur_r (-0.00688344 -0.1627934 0.04715156)
            DeGrooteFregly2016Muscle iliacus_r: max_isometric_force=1073 optimal_fiber_length=0.1061691
                tendon_slack_length=0.1061691 pennation_angle_at_optimal=0.1221731
              PathPoint P1: pelvis (-0.0690614 0.03739972 0.0875051)
              PathPoint P2: pelvis (-0.02643597 -0.05635574 0.0830991)
              ConditionalPathPoint P3: pelvis (-0.02950992 -0.08248431 0.08361143)
                  socket_coordinate=/jointset/hip_r/hip_flexion_r range=(-1.5708 0.785398)
              PathPoint P4: femur_r (0.001950308 -0.06229513 0.006539268)
              PathPoint P5: femur_r (-0.02214173 -0.0712436 0.0147994)
            DeGrooteFregly2016Muscle psoas_r: max_isometric_force=1113 optimal_fiber_length=0.1051779
                tendon_slack_length=0.1682847 pennation_angle_at_optimal=0.1396263
              PathPoint P1: pelvis (-0.06629484 0.09088644 0.02961238)
              PathPoint P2: pelvis (-0.02438667 -0.05840504 0.07777092)
              ConditionalPathPoint P3: pelvis (-0.02950992 -0.08248431 0.08361143)
                  socket_coordinate=/jointset/hip_r/hip_flexion_r range=(-1.5708 0.785398)
              PathPoint P4: femur_r (0.001835584 -0.05816507 0.004359512)
              PathPoint P5: femur_r (-0.02156811 -0.06849023 0.0119313)
            DeGrooteFregly2016Muscle quad_fem_r: max_isometric_force=381 optimal_fiber_length=0.05807631
                tendon_slack_length=0.02581169 pennation_angle_at_optimal=0
              PathPoint P1: pelvis (-0.1171175 -0.1179372 0.05328179)
              PathPoint P2: femur_r (-0.04370984 -0.04118592 0.04198898)
            DeGrooteFregly2016Muscle gem_r: max_isometric_force=164 optimal_fiber_length=0.02609521
                tendon_slack_length=0.04240472 pennation_angle_at_optimal=0
              PathPoint P1: pelvis (-0.1160928 -0.08402129 0.07316)
              PathPoint P2: femur_r (-0.01629081 -0.003785892 0.05082273)
            DeGrooteFregly2016Muscle peri_r: max_isometric_force=444 optimal_fiber_length=0.02733073
                tendon_slack_length=0.1208859 pennation_angle_at_optimal=0.1745329
              PathPoint P1: pelvis (-0.1430411 0.0003073949 0.02407927)
              PathPoint P2: pelvis (-0.1222407 -0.02828034 0.06731949)
              PathPoint P3: femur_r (-0.01697915 -0.004130064 0.05013439)
            DeGrooteFregly2016Muscle rect_fem_r: max_isometric_force=1169 optimal_fiber_length=0.130463
                tendon_slack_length=0.3547679 pennation_angle_at_optimal=0.08726646
              PathPoint P1: pelvis (-0.03022717 -0.03186661 0.0991861)
              ConditionalPathPoint P2: femur_r (0.03831782 -0.4623377 0.002179756)
                  socket_coordinate=/jointset/knee_r/knee_angle_r range=(-2.61799 -1.45997)
              MovingPathPoint P3: tibia_r socket_x_coordinate=/jointset/knee_r/knee_angle_r
                  socket_y_coordinate=/jointset/knee_r/knee_angle_r socket_z_coordinate=/jointset/knee_r/knee_angle_r
                x_location: MultiplierFunction: scale=0.988523
                  SimmSpline: x=(-2.0944 -1.99997 -1.5708 -1.45752 -1.39626 -1.0472 -0.698132 -0.526391 -0.349066 -0.174533 0 0.00017453 0.00034907 0.0279253 0.0872665 0.174533 2.0944)
                      y=(0.0155805 0.0179938 0.0275081 0.0296564 0.0307615 0.0365695 0.0422074 0.0450902 0.048391 0.0534299 0.0617576 0.0617669 0.0617762 0.0633083 0.066994 0.0733035 0.0573481)
                y_location: MultiplierFunction: scale=0.988523
                  SimmSpline: x=(-2.0944 -1.99997 -1.5708 -1.45752 -1.39626 -1.0472 -0.698132 -0.526391 -0.349066 -0.174533 0 0.00017453 0.00034907 0.0279253 0.0872665 0.174533 2.0944)
                      y=(0.0234116 0.0237613 0.0251141 0.0252795 0.0253146 0.0249184 0.0242373 0.0238447 0.0234197 0.0227644 0.020984 0.0209814 0.0209788 0.0205225 0.0191754 0.0159554 -0.0673774)
                z_location: MultiplierFunction: scale=0.988523
                  SimmSpline: x=(-2.0944 0.1745) y=(0.0014 0.0014)
            DeGrooteFregly2016Muscle vas_med_r: max_isometric_force=1164.6 optimal_fiber_length=0.1031382
                tendon_slack_length=0.1460159 pennation_angle_at_optimal=0.08726646
              PathPoint P1: femur_r (0.01606136 -0.2408057 0.02156811)
              PathPoint P2: femur_r (0.04084174 -0.3176708 0.001032516)
              ConditionalPathPoint P3: femur_r (0.04244788 -0.4644028 -0.0143405)
                  socket_coordinate=/jointset/knee_r/knee_angle_r range=(-2.61799 -1.21004)
              ConditionalPathPoint P4: femur_r (0.03143438 -0.4881506 -0.01502884)
                  socket_coordinate=/jointset/knee_r/knee_angle_r range=(-2.61799 -1.78006)
              MovingPathPoint P5: tibia_r socket_x_coordinate=/jointset/knee_r/knee_angle_r
                  socket_y_coordinate=/jointset/knee_r/knee_angle_r socket_z_coordinate=/jointset/knee_r/knee_angle_r
                x_location: MultiplierFunction: scale=0.988523
                  SimmSpline: x=(-2.0944 -1.99997 -1.5708 -1.45752 -1.39626 -1.0472 -0.698132 -0.526391 -0.349066 -0.174533 0 0.00017453 0.00034907 0.0279253 0.0872665 0.174533 2.0944)
                      y=(0.00981097 0.0122243 0.0217371 0.0238851 0.0249902 0.0307959 0.0364187 0.0392871 0.0425654 0.0475764 0.0559586 0.0559681 0.0559776 0.0575419 0.0613368 0.0679503 0.0629332)
                y_location: MultiplierFunction: scale=0.988523
                  SimmSpline: x=(-2.0944 -1.99997 -1.5708 -1.45752 -1.39626 -1.0472 -0.698132 -0.526391 -0.349066 -0.174533 0 0.00017453 0.00034907 0.0279253 0.0872665 0.174533 2.0944)
                      y=(0.0224154 0.0227651 0.0241265 0.0242933 0.0243287 0.0239462 0.0233593 0.0230677 0.0228342 0.0226362 0.0217917 0.0217903 0.0217889 0.0215365 0.0206842 0.0183269 -0.0656205)
                z_location: MultiplierFunction: scale=0.988523
                  SimmSpline: x=(-2.0944 2.0944) y=(-0.0146 -0.0146)
            DeGrooteFregly2016Muscle vas_int_r: max_isometric_force=1228.5 optimal_fiber_length=0.1013743
                tendon_slack_length=0.1584701 pennation_angle_at_optimal=0.05235988
              PathPoint P1: femur_r (0.03326996 -0.220729 0.03556444)
              PathPoint P2: femur_r (0.03843254 -0.2390848 0.03269634)
              ConditionalPathPoint P3: femur_r (0.03935033 -0.4623377 0.00630982)
                  socket_coordinate=/jointset/knee_r/knee_angle_r range=(-2.61799 -1.42)
              MovingPathPoint P4: tibia_r socket_x_coordinate=/jointset/knee_r/knee_angle_r
                  socket_y_coordinate=/jointset/knee_r/knee_angle_r socket_z_coordinate=/jointset/knee_r/knee_angle_r
                x_location: MultiplierFunction: scale=0.988523
                  SimmSpline: x=(-2.0944 -1.99997 -1.5708 -1.45752 -1.39626 -1.0472 -0.698132 -0.526391 -0.349066 -0.174533 0 0.00017453 0.00034907 0.0279253 0.0872665 0.174533 2.0944)
                      y=(0.0082733 0.0106866 0.0202042 0.022353 0.0234583 0.0292715 0.0349465 0.037871 0.0412569 0.0465287 0.0554632 0.0554735 0.0554837 0.0571717 0.061272 0.0684368 0.0648818)
                y_location: MultiplierFunction: scale=0.988523
                  SimmSpline: x=(-2.0944 -1.99997 -1.5708 -1.45752 -1.39626 -1.0472 -0.698132 -0.526391 -0.349066 -0.174533 0 0.00017453 0.00034907 0.0279253 0.0872665 0.174533 2.0944)
                      y=(0.025599 0.0259487 0.0273124 0.0274796 0.0275151 0.0271363 0.0265737 0.0263073 0.0261187 0.0260129 0.0252923 0.0252911 0.0252898 0.0250526 0.0242191 0.0218288 -0.0685706)
                z_location: MultiplierFunction: scale=0.988523
                  SimmSpline: x=(-2.0944 2.0944) y=(0.0018 0.0018)
            DeGrooteFregly2016Muscle vas_lat_r: max_isometric_force=1683.9 optimal_fiber_length=0.09705652
                tendon_slack_length=0.1814032 pennation_angle_at_optimal=0.08726646
              PathPoint P1: femur_r (0.005506752 -0.2126983 0.04003868)
              PathPoint P2: femur_r (0.03086076 -0.2972499 0.04692212)
              ConditionalPathPoint P3: femur_r (0.04141536 -0.4623377 0.02351842)
                  socket_coordinate=/jointset/knee_r/knee_angle_r range=(-2.61799 -1.21004)
              ConditionalPathPoint P4: femur_r (0.02902517 -0.4867739 0.02110922)
                  socket_coordinate=/jointset/knee_r/knee_angle_r range=(-2.61799 -1.92004)
              MovingPathPoint P5: tibia_r socket_x_coordinate=/jointset/knee_r/knee_angle_r
                  socket_y_coordinate=/jointset/knee_r/knee_angle_r socket_z_coordinate=/jointset/knee_r/knee_angle_r
                x_location: MultiplierFunction: scale=0.988523
                  SimmSpline: x=(-2.0944 -1.99997 -1.5708 -1.45752 -1.39626 -1.0472 -0.698132 -0.526391 -0.349066 -0.174533 0 0.00017453 0.00034907 0.0279253 0.0872665 0.174533 2.0944)
                      y=(0.0142897 0.016703 0.0262145 0.0283623 0.0294674 0.0352709 0.0408785 0.0437291 0.0469704 0.0518742 0.0599557 0.0599647 0.0599738 0.0614577 0.0650351 0.0711867 0.0583766)
                y_location: MultiplierFunction: scale=0.988523
                  SimmSpline: x=(-2.0944 -1.99997 -1.5708 -1.45752 -1.39626 -1.0472 -0.698132 -0.526391 -0.349066 -0.174533 0 0.00017453 0.00034907 0.0279253 0.0872665 0.174533 2.0944)
                      y=(0.0215318 0.0218815 0.0232362 0.0234019 0.0234371 0.0230439 0.0223842 0.0220151 0.0216359 0.0210971 0.0195864 0.0195842 0.019582 0.01919 0.018008 0.0151073 -0.0653421)
                z_location: MultiplierFunction: scale=0.988523
                  SimmSpline: x=(-2.0944 2.0944) y=(0.0165 0.0165)
            DeGrooteFregly2016Muscle med_gas_r: max_isometric_force=1558 optimal_fiber_length=0.06008665
                tendon_slack_length=0.3905632 pennation_angle_at_optimal=0.296706
              PathPoint P1: femur_r (-0.02179756 -0.4507506 -0.02696014)
              ConditionalPathPoint P2: femur_r (-0.0344172 -0.4614199 -0.02959879)
                  socket_coordinate=/jointset/knee_r/knee_angle_r range=(-0.785398 0.174533)
              PathPoint P3: calcn_r (0 0.03183936 -0.005443504)
            DeGrooteFregly2016Muscle lat_gas_r: max_isometric_force=683 optimal_fiber_length=0.06400324
                tendon_slack_length=0.3800192 pennation_angle_at_optimal=0.1396263
              PathPoint P1: femur_r (-0.02523928 -0.4527009 0.03120493)
              ConditionalPathPoint P2: femur_r (-0.0344172 -0.460961 0.03143438)
                  socket_coordinate=/jointset/knee_r/knee_angle_r range=(-0.785398 0.174533)
              PathPoint P3: calcn_r (0 0.03183936 -0.005443504)
            DeGrooteFregly2016Muscle soleus_r: max_isometric_force=3549 optimal_fiber_length=0.05029
                tendon_slack_length=0.25145 pennation_angle_at_optimal=0.4363323
              PathPoint P1: tibia_r (-0.002372455 -0.1515406 0.007018513)
              PathPoint P2: calcn_r (0 0.03183936 -0.005443504)
            DeGrooteFregly2016Muscle tib_post_r: max_isometric_force=1588 optimal_fiber_length=0.03107595
                tendon_slack_length=0.3107595 pennation_angle_at_optimal=0.2094395
              PathPoint P1: tibia_r (-0.009292116 -0.1332529 0.001878194)
              PathPoint P2: tibia_r (-0.01423473 -0.4004507 -0.02263718)
              PathPoint P3: calcn_r (0.04282908 0.03430435 -0.02937438)
              PathPoint P4: calcn_r (0.07929029 0.01633051 -0.02886084)
            DeGrooteFregly2016Muscle flex_dig_r: max_isometric_force=310 optimal_fiber_length=0.03443775
                tendon_slack_length=0.40515 pennation_angle_at_optimal=0.1221731
              PathPoint P1: tibia_r (-0.008204741 -0.2022518 -0.001779341)
              PathPoint P2: tibia_r (-0.01522325 -0.4004507 -0.01937505)
              PathPoint P3: calcn_r (0.04478052 0.0323529 -0.02875814)
              PathPoint P4: calcn_r (0.072717 0.01807654 -0.02701211)
              PathPoint P5: calcn_r (0.1702892 -0.008319318 0.01191408)
              PathPoint P6: toes_r (-0.001951445 -0.008011195 0.01509802)
              PathPoint P7: toes_r (0.02927167 -0.007292241 0.02208214)
              PathPoint P8: toes_r (0.04529406 -0.006162458 0.02485525)
            DeGrooteFregly2016Muscle flex_hal_r: max_isometric_force=322 optimal_fiber_length=0.04367445
                tendon_slack_length=0.3859603 pennation_angle_at_optimal=0.1745329
              PathPoint P1: tibia_r (-0.007809332 -0.2307213 0.02411996)
              PathPoint P2: tibia_r (-0.01838653 -0.4032185 -0.0172003)
              PathPoint P3: calcn_r (0.03841265 0.0283473 -0.02475254)
              PathPoint P4: calcn_r (0.1066105 0.006984119 -0.02629315)
              PathPoint P5: calcn_r (0.1772734 -0.005443504 -0.02762835)
              PathPoint P6: toes_r (0.01591968 -0.006573288 -0.02721752)
              PathPoint P7: toes_r (0.05772169 -0.01047618 -0.01859008)
            DeGrooteFregly2016Muscle tib_ant_r: max_isometric_force=905 optimal_fiber_length=0.09791312
                tendon_slack_length=0.2228023 pennation_angle_at_optimal=0.08726646
              PathPoint P1: tibia_r (0.01769456 -0.1605361 0.01136801)
              PathPoint P2: tibia_r (0.03252241 -0.3905654 -0.01749686)
              PathPoint P3: calcn_r (0.1197571 0.01828196 -0.03132583)
            DeGrooteFregly2016Muscle per_brev_r: max_isometric_force=435 optimal_fiber_length=0.05004116
                tendon_slack_length=0.1611325 pennation_angle_at_optimal=0.08726646
              PathPoint P1: tibia_r (-0.006919661 -0.2615632 0.032127)
              PathPoint P2: tibia_r (-0.01957276 -0.413598 0.0279752)
              PathPoint P3: tibia_r (-0.01423473 -0.4245706 0.02856831)
              PathPoint P4: calcn_r (0.04837529 0.02773106 0.02393088)
              PathPoint P5: calcn_r (0.06953306 0.02249297 0.03522872)
            DeGrooteFregly2016Muscle per_long_r: max_isometric_force=943 optimal_fiber_length=0.04918484
                tendon_slack_length=0.3463015 pennation_angle_at_optimal=0.1745329
              PathPoint P1: tibia_r (0.0004942615 -0.1550004 0.03578453)
              PathPoint P2: tibia_r (-0.02046243 -0.4156739 0.02827176)
              PathPoint P3: tibia_r (-0.01601407 -0.4269431 0.02856831)
              PathPoint P4: calcn_r (0.04498594 0.02362275 0.02269839)
              PathPoint P5: calcn_r (0.06994389 0.01088701 0.02916897)
              PathPoint P6: calcn_r (0.0875069 0.007086826 0.0121195)
              PathPoint P7: calcn_r (0.1235573 0.008730148 -0.0188982)
            DeGrooteFregly2016Muscle per_tert_r: max_isometric_force=180 optimal_fiber_length=0.07988692
                tendon_slack_length=0.1011227 pennation_angle_at_optimal=0.2268928
              PathPoint P1: tibia_r (0.000988523 -0.2771818 0.02283488)
              PathPoint P2: tibia_r (0.02263718 -0.40223 0.01571752)
              PathPoint P3: calcn_r (0.08802044 0.02341734 0.03070958)
            DeGrooteFregly2016Muscle ext_dig_r: max_isometric_force=512 optimal_fiber_length=0.1026945
                tendon_slack_length=0.3473491 pennation_angle_at_optimal=0.1396263
              PathPoint P1: tibia_r (0.003163274 -0.136515 0.02728323)
              PathPoint P2: tibia_r (0.02856831 -0.3961012 0.007117366)
              PathPoint P3: calcn_r (0.09469643 0.03985056 -0.0001027076)
              PathPoint P4: calcn_r (0.1659755 0.005648919 0.01335199)
              PathPoint P5: toes_r (0.0003081229 0.004827258 0.01571427)
              PathPoint P6: toes_r (0.04549948 -0.0004108305 0.02567691)
            DeGrooteFregly2016Muscle ext_hal_r: max_isometric_force=162 optimal_fiber_length=0.1119451
                tendon_slack_length=0.3075968 pennation_angle_at_optimal=0.1047198
              PathPoint P1: tibia_r (0.001186228 -0.174672 0.02253832)
              PathPoint P2: tibia_r (0.03222585 -0.3939264 -0.008402446)
              PathPoint P3: calcn_r (0.0996264 0.03995327 -0.02167131)
              PathPoint P4: calcn_r (0.132801 0.03173666 -0.02639586)
              PathPoint P5: calcn_r (0.178095 0.01427636 -0.02875814)
              PathPoint P6: toes_r (0.03060687 0.004211013 -0.02516337)
              PathPoint P7: toes_r (0.05782439 0.003492059 -0.01910362)
            DeGrooteFregly2016Muscle glut_med1_l: max_isometric_force=819 optimal_fiber_length=0.05640925
                tendon_slack_length=0.08224152 pennation_angle_at_optimal=0.1396263
              PathPoint P1: pelvis (-0.04180571 0.03114935 -0.1238802)
              PathPoint P2: femur_l (-0.02500983 -0.01342271 -0.06367182)
            DeGrooteFregly2016Muscle glut_med2_l: max_isometric_force=573 optimal_fiber_length=0.08913635
                tendon_slack_length=0.05590801 pennation_angle_at_optimal=0
              PathPoint P1: pelvis (-0.08760756 0.04559692 -0.07848818)
              PathPoint P2: femur_l (-0.02959879 -0.006653992 -0.06045955)
            DeGrooteFregly2016Muscle glut_med3_l: max_isometric_force=653 optimal_fiber_length=0.06853389
                tendon_slack_length=0.05622749 pennation_angle_at_optimal=0.3316126
              PathPoint P1: pelvis (-0.1253147 0.01075882 -0.06639731)
              PathPoint P2: femur_l (-0.03544972 -0.005392028 -0.05942703)
            DeGrooteFregly2016Muscle glut_min1_l: max_isometric_force=270 optimal_fiber_length=0.07329192
                tendon_slack_length=0.01724516 pennation_angle_at_optimal=0.1745329
              PathPoint P1: pelvis (-0.04785115 -0.008197199 -0.108203)
              PathPoint P2: femur_l (-0.008260128 -0.0119313 -0.06424544)
            DeGrooteFregly2016Muscle glut_min2_l: max_isometric_force=285 optimal_fiber_length=0.06066135
                tendon_slack_length=0.0281642 pennation_angle_at_optimal=0
              PathPoint P1: pelvis (-0.06486033 -0.006660224 -0.1015428)
              PathPoint P2: femur_l (-0.0110135 -0.0119313 -0.06424544)
            DeGrooteFregly2016Muscle glut_min3_l: max_isometric_force=323 optimal_fiber_length=0.04117832
                tendon_slack_length=0.05526564 pennation_angle_at_optimal=0.01745329
              PathPoint P1: pelvis (-0.0854558 -0.006455294 -0.08771003)
              PathPoint P2: femur_l (-0.01548774 -0.009522092 -0.0630982)
            DeGrooteFregly2016Muscle semimem_l: max_isometric_force=1288 optimal_fiber_length=0.09098493
                tendon_slack_length=0.4082949 pennation_angle_at_optimal=0.2617994
              PathPoint P1: pelvis (-0.1221383 -0.09987262 -0.07327271)
              ConditionalPathPoint P2: tibia_l (-0.0344006 -0.03478612 0.01869297)
                  socket_coordinate=/jointset/knee_l/knee_angle_l range=(-0.558505 0.174533)
              PathPoint P3: tibia_l (-0.02669012 -0.04716243 0.0193454)
            DeGrooteFregly2016Muscle semiten_l: max_isometric_force=410 optimal_fiber_length=0.2252728
                tendon_slack_length=0.2863542 pennation_angle_at_optimal=0.08726646
              PathPoint P1: pelvis (-0.1294645 -0.1125885 -0.0618786)
              ConditionalPathPoint P2: tibia_l (-0.04154762 -0.02826187 0.02250867)
                  socket_coordinate=/jointset/knee_l/knee_angle_l range=(-0.331613 0.174533)
              PathPoint P3: tibia_l (-0.03283873 -0.05221378 0.02261741)
              PathPoint P4: tibia_l (-0.01117031 -0.07374382 0.02421881)
              PathPoint P5: tibia_l (0.002669012 -0.0945028 0.01907849)
            DeGrooteFregly2016Muscle bifemlh_l: max_isometric_force=896 optimal_fiber_length=0.1236305
                tendon_slack_length=0.3697572 pennation_angle_at_optimal=0
              PathPoint P1: pelvis (-0.1290649 -0.1050983 -0.07115168)
              PathPoint P2: tibia_l (-0.02975454 -0.03558683 -0.02909223)
              PathPoint P3: tibia_l (-0.02313144 -0.05565384 -0.03390634)
            DeGrooteFregly2016Muscle bifemsh_l: max_isometric_force=804 optimal_fiber_length=0.1914449
                tendon_slack_length=0.09848899 pennation_angle_at_optimal=0.4014257
              PathPoint P1: femur_l (0.0057362 -0.2421824 -0.02684542)
              PathPoint P2: tibia_l (-0.02975454 -0.03558683 -0.02909223)
              PathPoint P3: tibia_l (-0.02313144 -0.05565384 -0.03390634)
            DeGrooteFregly2016Muscle sar_l: max_isometric_force=156 optimal_fiber_length=0.5742207
                tendon_slack_length=0.1104271 pennation_angle_at_optimal=0
              PathPoint P1: pelvis (-0.01567714 -0.001332045 -0.1272615)
              PathPoint P2: femur_l (-0.00344172 -0.4093352 0.0482988)
              PathPoint P3: tibia_l (-0.005535729 -0.04141911 0.03944207)
              PathPoint P4: tibia_l (0.005931138 -0.058224 0.03786043)
              PathPoint P5: tibia_l (0.02402111 -0.08303593 0.02491078)
            DeGrooteFregly2016Muscle add_long_l: max_isometric_force=627 optimal_fiber_length=0.1570092
                tendon_slack_length=0.1251523 pennation_angle_at_optimal=0.1047198
              PathPoint P1: pelvis (-0.03237893 -0.08566073 -0.01731658)
              PathPoint P2: femur_l (0.0057362 -0.2421824 -0.02684542)
            DeGrooteFregly2016Muscle add_brev_l: max_isometric_force=429 optimal_fiber_length=0.1490394
                tendon_slack_length=0.02241194 pennation_angle_at_optimal=0
              PathPoint P1: pelvis (-0.06014695 -0.09375546 -0.01680426)
              PathPoint P2: femur_l (0.001032516 -0.1372099 -0.03372886)
            DeGrooteFregly2016Muscle add_mag1_l: max_isometric_force=381 optimal_fiber_length=0.09866341
                tendon_slack_length=0.06804373 pennation_angle_at_optimal=0.08726646
              PathPoint P1: pelvis (-0.07500437 -0.1202939 -0.02612857)
              PathPoint P2: femur_l (-0.00516258 -0.1389308 -0.03889144)
            DeGrooteFregly2016Muscle add_mag2_l: max_isometric_force=343 optimal_fiber_length=0.1409884
                tendon_slack_length=0.1398232 pennation_angle_at_optimal=0.05235988
              PathPoint P1: pelvis (-0.0851484 -0.1221383 -0.03155921)
              PathPoint P2: femur_l (0.006195096 -0.2621443 -0.02604235)
            DeGrooteFregly2016Muscle add_mag3_l: max_isometric_force=488 optimal_fiber_length=0.1522592
                tendon_slack_length=0.2894088 pennation_angle_at_optimal=0.08726646
              PathPoint P1: pelvis (-0.1138181 -0.1169433 -0.0500234)
              PathPoint P2: femur_l (0.00803068 -0.440196 0.03051658)
            DeGrooteFregly2016Muscle tfl_l: max_isometric_force=233 optimal_fiber_length=0.106039
                tendon_slack_length=0.4743849 pennation_angle_at_optimal=0.05235988
              PathPoint P1: pelvis (-0.03186661 0.02192751 -0.127159)
              PathPoint P2: femur_l (0.03372886 -0.1141504 -0.06849023)
              PathPoint P3: femur_l (0.006195096 -0.4645175 -0.04095647)
              PathPoint P4: tibia_l (0.005931138 -0.04814107 -0.02935913)
            DeGrooteFregly2016Muscle pect_l: max_isometric_force=266 optimal_fiber_length=0.1116577
                tendon_slack_length=0.03684704 pennation_angle_at_optimal=0
              PathPoint P1: pelvis (-0.04416241 -0.07869311 -0.04621171)
              PathPoint P2: femur_l (-0.01399633 -0.09430313 -0.02902517)
            DeGrooteFregly2016Muscle grac_l: max_isometric_force=162 optimal_fiber_length=0.396583
                tendon_slack_length=0.1419587 pennation_angle_at_optimal=0.05235988
              PathPoint P1: pelvis (-0.07583433 -0.1216259 -0.02862872)
              ConditionalPathPoint P2: tibia_l (-0.02626506 -0.03153388 0.03730686)
                  socket_coordinate=/jointset/knee_l/knee_angle_l range=(-0.436332 0.174533)
              PathPoint P3: tibia_l (-0.019207 -0.05093859 0.03538912)
              PathPoint P4: tibia_l (0.005931138 -0.08264052 0.02253832)
            DeGrooteFregly2016Muscle glut_max1_l: max_isometric_force=573 optimal_fiber_length=0.1515936
                tendon_slack_length=0.1334451 pennation_angle_at_optimal=0.08726646
              PathPoint P1: pelvis (-0.1224457 0.06270857 -0.07172549)
              PathPoint P2: pelvis (-0.1322823 0.00122958 -0.09078398)
              PathPoint P3: femur_l (-0.05242887 -0.02845155 -0.04497181)
              PathPoint P4: femur_l (-0.03177855 -0.06493378 -0.05392028)
            DeGrooteFregly2016Muscle glut_max2_l: max_isometric_force=819 optimal_fiber_length=0.1594001
                tendon_slack_length=0.137713 pennation_angle_at_optimal=0
              PathPoint P1: pelvis (-0.1382253 0.01803384 -0.05768779)
              PathPoint P2: pelvis (-0.1409918 -0.05328179 -0.09365299)
              PathPoint P3: femur_l (-0.04887242 -0.06080372 -0.03361413)
              PathPoint P4: femur_l (-0.01789694 -0.1165596 -0.04806936)
            DeGrooteFregly2016Muscle glut_max3_l: max_isometric_force=552 optimal_fiber_length=0.1562935
                tendon_slack_length=0.1573788 pennation_angle_at_optimal=0.08726646
              PathPoint P1: pelvis (-0.1594355 -0.032174 -0.005942969)
              PathPoint P2: pelvis (-0.156669 -0.1077932 -0.04129339)
              PathPoint P3: femur_l (-0.03430248 -0.1194277 -0.01548774)
              PathPoint P4: femur_l (-0.00688344 -0.1627934 -0.04715156)
            DeGrooteFregly2016Muscle iliacus_l: max_isometric_force=1073 optimal_fiber_length=0.1061691
                tendon_slack_length=0.1061691 pennation_angle_at_optimal=0.1221731
              PathPoint P1: pelvis (-0.0690614 0.03739972 -0.0875051)
              PathPoint P2: pelvis (-0.02643597 -0.05635574 -0.0830991)
              ConditionalPathPoint P3: pelvis (-0.02950992 -0.08248431 -0.08361143)
                  socket_coordinate=/jointset/hip_l/hip_flexion_l range=(-1.5708 0.785398)
              PathPoint P4: femur_l (0.001950308 -0.06229513 -0.006539268)
              PathPoint P5: femur_l (-0.02214173 -0.0712436 -0.0147994)
            DeGrooteFregly2016Muscle psoas_l: max_isometric_force=1113 optimal_fiber_length=0.1051779
                tendon_slack_length=0.1682847 pennation_angle_at_optimal=0.1396263
              PathPoint P1: pelvis (-0.06629484 0.09088644 -0.02961238)
              PathPoint P2: pelvis (-0.02438667 -0.05840504 -0.07777092)
              ConditionalPathPoint P3: pelvis (-0.02950992 -0.08248431 -0.08361143)
                  socket_coordinate=/jointset/hip_l/hip_flexion_l range=(-1.5708 0.785398)
              PathPoint P4: femur_l (0.001835584 -0.05816507 -0.004359512)
              PathPoint P5: femur_l (-0.02156811 -0.06849023 -0.0119313)
            DeGrooteFregly2016Muscle quad_fem_l: max_isometric_force=381 optimal_fiber_length=0.05807631
                tendon_slack_length=0.02581169 pennation_angle_at_optimal=0
              PathPoint P1: pelvis (-0.1171175 -0.1179372 -0.05328179)
              PathPoint P2: femur_l (-0.04370984 -0.04118592 -0.04198898)
            DeGrooteFregly2016Muscle gem_l: max_isometric_force=164 optimal_fiber_length=0.02609521
                tendon_slack_length=0.04240472 pennation_angle_at_optimal=0
              PathPoint P1: pelvis (-0.1160928 -0.08402129 -0.07316)
              PathPoint P2: femur_l (-0.01629081 -0.003785892 -0.05082273)
            DeGrooteFregly2016Muscle peri_l: max_isometric_force=444 optimal_fiber_length=0.02733073
                tendon_slack_length=0.1208859 pennation_angle_at_optimal=0.1745329
              PathPoint P1: pelvis (-0.1430411 0.0003073949 -0.02407927)
              PathPoint P2: pelvis (-0.1222407 -0.02828034 -0.06731949)
              PathPoint P3: femur_l (-0.01697915 -0.004130064 -0.05013439)
            DeGrooteFregly2016Muscle rect_fem_l: max_isometric_force=1169 optimal_fiber_length=0.130463
                tendon_slack_length=0.3547679 pennation_angle_at_optimal=0.08726646
              PathPoint P1: pelvis (-0.03022717 -0.03186661 -0.0991861)
              ConditionalPathPoint P2: femur_l (0.03831782 -0.4623377 -0.002179756)
                  socket_coordinate=/jointset/knee_l/knee_angle_l range=(-2.61799 -1.45997)
              MovingPathPoint P3: tibia_l socket_x_coordinate=/jointset/knee_l/knee_angle_l
                  socket_y_coordinate=/jointset/knee_l/knee_angle_l socket_z_coordinate=/jointset/knee_l/knee_angle_l
                x_location: MultiplierFunction: scale=0.988523
                  SimmSpline: x=(-2.0944 -1.99997 -1.5708 -1.45752 -1.39626 -1.0472 -0.698132 -0.526391 -0.349066 -0.174533 0 0.00017453 0.00034907 0.0279253 0.0872665 0.174533 2.0944)
                      y=(0.0155805 0.0179938 0.0275081 0.0296564 0.0307615 0.0365695 0.0422074 0.0450902 0.048391 0.0534299 0.0617576 0.0617669 0.0617762 0.0633083 0.066994 0.0733035 0.0573481)
                y_location: MultiplierFunction: scale=0.988523
                  SimmSpline: x=(-2.0944 -1.99997 -1.5708 -1.45752 -1.39626 -1.0472 -0.698132 -0.526391 -0.349066 -0.174533 0 0.00017453 0.00034907 0.0279253 0.0872665 0.174533 2.0944)
                      y=(0.0234116 0.0237613 0.0251141 0.0252795 0.0253146 0.0249184 0.0242373 0.0238447 0.0234197 0.0227644 0.020984 0.0209814 0.0209788 0.0205225 0.0191754 0.0159554 -0.0673774)
                z_location: MultiplierFunction: scale=0.988523
                  SimmSpline: x=(-2.0944 0.1745) y=(-0.0014 -0.0014)
            DeGrooteFregly2016Muscle vas_med_l: max_isometric_force=1294 optimal_fiber_length=0.1031382
                tendon_slack_length=0.1460159 pennation_angle_at_optimal=0.08726646
              PathPoint P1: femur_l (0.01606136 -0.2408057 -0.02156811)
              PathPoint P2: femur_l (0.04084174 -0.3176708 -0.001032516)
              ConditionalPathPoint P3: femur_l (0.04244788 -0.4644028 0.0143405)
                  socket_coordinate=/jointset/knee_l/knee_angle_l range=(-2.61799 -1.21004)
              ConditionalPathPoint P4: femur_l (0.03143438 -0.4881506 0.01502884)
                  socket_coordinate=/jointset/knee_l/knee_angle_l range=(-2.61799 -1.78006)
              MovingPathPoint P5: tibia_l socket_x_coordinate=/jointset/knee_l/knee_angle_l
                  socket_y_coordinate=/jointset/knee_l/knee_angle_l socket_z_coordinate=/jointset/knee_l/knee_angle_l
                x_location: MultiplierFunction: scale=0.988523
                  SimmSpline: x=(-2.0944 -1.99997 -1.5708 -1.45752 -1.39626 -1.0472 -0.698132 -0.526391 -0.349066 -0.174533 0 0.00017453 0.00034907 0.0279253 0.0872665 0.174533 2.0944)
                      y=(0.00981097 0.0122243 0.0217371 0.0238851 0.0249902 0.0307959 0.0364187 0.0392871 0.0425654 0.0475764 0.0559586 0.0559681 0.0559776 0.0575419 0.0613368 0.0679503 0.0629332)
                y_location: MultiplierFunction: scale=0.988523
                  SimmSpline: x=(-2.0944 -1.99997 -1.5708 -1.45752 -1.39626 -1.0472 -0.698132 -0.526391 -0.349066 -0.174533 0 0.00017453 0.00034907 0.0279253 0.0872665 0.174533 2.0944)
                      y=(0.0224154 0.0227651 0.0241265 0.0242933 0.0243287 0.0239462 0.0233593 0.0230677 0.0228342 0.0226362 0.0217917 0.0217903 0.0217889 0.0215365 0.0206842 0.0183269 -0.0656205)
                z_location: MultiplierFunction: scale=0.988523
                  SimmSpline: x=(-2.0944 2.0944) y=(0.0146 0.0146)
            DeGrooteFregly2016Muscle vas_int_l: max_isometric_force=1365 optimal_fiber_length=0.1013743
                tendon_slack_length=0.1584701 pennation_angle_at_optimal=0.05235988
              PathPoint P1: femur_l (0.03326996 -0.220729 -0.03556444)
              PathPoint P2: femur_l (0.03843254 -0.2390848 -0.03269634)
              ConditionalPathPoint P3: femur_l (0.03935033 -0.4623377 -0.00630982)
                  socket_coordinate=/jointset/knee_l/knee_angle_l range=(-2.61799 -1.42)
              MovingPathPoint P4: tibia_l socket_x_coordinate=/jointset/knee_l/knee_angle_l
                  socket_y_coordinate=/jointset/knee_l/knee_angle_l socket_z_coordinate=/jointset/knee_l/knee_angle_l
                x_location: MultiplierFunction: scale=0.988523
                  SimmSpline: x=(-2.0944 -1.99997 -1.5708 -1.45752 -1.39626 -1.0472 -0.698132 -0.526391 -0.349066 -0.174533 0 0.00017453 0.00034907 0.0279253 0.0872665 0.174533 2.0944)
                      y=(0.0082733 0.0106866 0.0202042 0.022353 0.0234583 0.0292715 0.0349465 0.037871 0.0412569 0.0465287 0.0554632 0.0554735 0.0554837 0.0571717 0.061272 0.0684368 0.0648818)
                y_location: MultiplierFunction: scale=0.988523
                  SimmSpline: x=(-2.0944 -1.99997 -1.5708 -1.45752 -1.39626 -1.0472 -0.698132 -0.526391 -0.349066 -0.174533 0 0.00017453 0.00034907 0.0279253 0.0872665 0.174533 2.0944)
                      y=(0.025599 0.0259487 0.0273124 0.0274796 0.0275151 0.0271363 0.0265737 0.0263073 0.0261187 0.0260129 0.0252923 0.0252911 0.0252898 0.0250526 0.0242191 0.0218288 -0.0685706)
                z_location: MultiplierFunction: scale=0.988523
                  SimmSpline: x=(-2.0944 2.0944) y=(-0.0018 -0.0018)
            DeGrooteFregly2016Muscle vas_lat_l: max_isometric_force=1871 optimal_fiber_length=0.09705652
                tendon_slack_length=0.1814032 pennation_angle_at_optimal=0.08726646
              PathPoint P1: femur_l (0.005506752 -0.2126983 -0.04003868)
              PathPoint P2: femur_l (0.03086076 -0.2972499 -0.04692212)
              ConditionalPathPoint P3: femur_l (0.04141536 -0.4623377 -0.02351842)
                  socket_coordinate=/jointset/knee_l/knee_angle_l range=(-2.61799 -1.21004)
              ConditionalPathPoint P4: femur_l (0.02902517 -0.4867739 -0.02110922)
                  socket_coordinate=/jointset/knee_l/knee_angle_l range=(-2.61799 -1.92004)
              MovingPathPoint P5: tibia_l socket_x_coordinate=/jointset/knee_l/knee_angle_l
                  socket_y_coordinate=/jointset/knee_l/knee_angle_l socket_z_coordinate=/jointset/knee_l/knee_angle_l
                x_location: MultiplierFunction: scale=0.988523
                  SimmSpline: x=(-2.0944 -1.99997 -1.5708 -1.45752 -1.39626 -1.0472 -0.698132 -0.526391 -0.349066 -0.174533 0 0.00017453 0.00034907 0.0279253 0.0872665 0.174533 2.0944)
                      y=(0.0142897 0.016703 0.0262145 0.0283623 0.0294674 0.0352709 0.0408785 0.0437291 0.0469704 0.0518742 0.0599557 0.0599647 0.0599738 0.0614577 0.0650351 0.0711867 0.0583766)
                y_location: MultiplierFunction: scale=0.988523
                  SimmSpline: x=(-2.0944 -1.99997 -1.5708 -1.45752 -1.39626 -1.0472 -0.698132 -0.526391 -0.349066 -0.174533 0 0.00017453 0.00034907 0.0279253 0.0872665 0.174533 2.0944)
                      y=(0.0215318 0.0218815 0.0232362 0.0234019 0.0234371 0.0230439 0.0223842 0.0220151 0.0216359 0.0210971 0.0195864 0.0195842 0.019582 0.01919 0.018008 0.0151073 -0.0653421)
                z_location: MultiplierFunction: scale=0.988523
                  SimmSpline: x=(-2.0944 2.0944) y=(-0.0165 -0.0165)
            DeGrooteFregly2016Muscle med_gas_l: max_isometric_force=1558 optimal_fiber_length=0.06008665
                tendon_slack_length=0.3905632 pennation_angle_at_optimal=0.296706
              PathPoint P1: femur_l (-0.02179756 -0.4507506 0.02696014)
              ConditionalPathPoint P2: femur_l (-0.0344172 -0.4614199 0.02959879)
                  socket_coordinate=/jointset/knee_l/knee_angle_l range=(-0.785398 0.174533)
              PathPoint P3: calcn_l (0 0.03183936 0.005443504)
            DeGrooteFregly2016Muscle lat_gas_l: max_isometric_force=683 optimal_fiber_length=0.06400324
                tendon_slack_length=0.3800192 pennation_angle_at_optimal=0.1396263
              PathPoint P1: femur_l (-0.02523928 -0.4527009 -0.03120493)
              ConditionalPathPoint P2: femur_l (-0.0344172 -0.460961 -0.03143438)
                  socket_coordinate=/jointset/knee_l/knee_angle_l range=(-0.785398 0.174533)
              PathPoint P3: calcn_l (0 0.03183936 0.005443504)
            DeGrooteFregly2016Muscle soleus_l: max_isometric_force=3549 optimal_fiber_length=0.05029
                tendon_slack_length=0.25145 pennation_angle_at_optimal=0.4363323
              PathPoint P1: tibia_l (-0.002372455 -0.1515406 -0.007018513)
              PathPoint P2: calcn_l (0 0.03183936 0.005443504)
            DeGrooteFregly2016Muscle tib_post_l: max_isometric_force=1588 optimal_fiber_length=0.03107595
                tendon_slack_length=0.3107595 pennation_angle_at_optimal=0.2094395
              PathPoint P1: tibia_l (-0.009292116 -0.1332529 -0.001878194)
              PathPoint P2: tibia_l (-0.01423473 -0.4004507 0.02263718)
              PathPoint P3: calcn_l (0.04282908 0.03430435 0.02937438)
              PathPoint P4: calcn_l (0.07929029 0.01633051 0.02886084)
            DeGrooteFregly2016Muscle flex_dig_l: max_isometric_force=310 optimal_fiber_length=0.03443775
                tendon_slack_length=0.40515 pennation_angle_at_optimal=0.1221731
              PathPoint P1: tibia_l (-0.008204741 -0.2022518 0.001779341)
              PathPoint P2: tibia_l (-0.01522325 -0.4004507 0.01937505)
              PathPoint P3: calcn_l (0.04478052 0.0323529 0.02875814)
              PathPoint P4: calcn_l (0.072717 0.01807654 0.02701211)
              PathPoint P5: calcn_l (0.1702892 -0.008319318 -0.01191408)
              PathPoint P6: toes_l (-0.001951445 -0.008011195 -0.01509802)
              PathPoint P7: toes_l (0.02927167 -0.007292241 -0.02208214)
              PathPoint P8: toes_l (0.04529406 -0.006162458 -0.02485525)
            DeGrooteFregly2016Muscle flex_hal_l: max_isometric_force=322 optimal_fiber_length=0.04367445
                tendon_slack_length=0.3859603 pennation_angle_at_optimal=0.1745329
              PathPoint P1: tibia_l (-0.007809332 -0.2307213 -0.02411996)
              PathPoint P2: tibia_l (-0.01838653 -0.4032185 0.0172003)
              PathPoint P3: calcn_l (0.03841265 0.0283473 0.02475254)
              PathPoint P4: calcn_l (0.1066105 0.006984119 0.02629315)
              PathPoint P5: calcn_l (0.1772734 -0.005443504 0.02762835)
              PathPoint P6: toes_l (0.01591968 -0.006573288 0.02721752)
              PathPoint P7: toes_l (0.05772169 -0.01047618 0.01859008)
            DeGrooteFregly2016Muscle tib_ant_l: max_isometric_force=905 optimal_fiber_length=0.09791312
                tendon_slack_length=0.2228023 pennation_angle_at_optimal=0.08726646
              PathPoint P1: tibia_l (0.01769456 -0.1605361 -0.01136801)
              PathPoint P2: tibia_l (0.03252241 -0.3905654 0.01749686)
              PathPoint P3: calcn_l (0.1197571 0.01828196 0.03132583)
            DeGrooteFregly2016Muscle per_brev_l: max_isometric_force=435 optimal_fiber_length=0.05004116
                tendon_slack_length=0.1611325 pennation_angle_at_optimal=0.08726646
              PathPoint P1: tibia_l (-0.006919661 -0.2615632 -0.032127)
              PathPoint P2: tibia_l (-0.01957276 -0.413598 -0.0279752)
              PathPoint P3: tibia_l (-0.01423473 -0.4245706 -0.02856831)
              PathPoint P4: calcn_l (0.04837529 0.02773106 -0.02393088)
              PathPoint P5: calcn_l (0.06953306 0.02249297 -0.03522872)
            DeGrooteFregly2016Muscle per_long_l: max_isometric_force=943 optimal_fiber_length=0.04918484
                tendon_slack_length=0.3463015 pennation_angle_at_optimal=0.1745329
              PathPoint P1: tibia_l (0.0004942615 -0.1550004 -0.03578453)
              PathPoint P2: tibia_l (-0.02046243 -0.4156739 -0.02827176)
              PathPoint P3: tibia_l (-0.01601407 -0.4269431 -0.02856831)
              PathPoint P4: calcn_l (0.04498594 0.02362275 -0.02269839)
              PathPoint P5: calcn_l (0.06994389 0.01088701 -0.02916897)
              PathPoint P6: calcn_l (0.0875069 0.007086826 -0.0121195)
              PathPoint P7: calcn_l (0.1235573 0.008730148 0.0188982)
            DeGrooteFregly2016Muscle per_tert_l: max_isometric_force=180 optimal_fiber_length=0.07988692
                tendon_slack_length=0.1011227 pennation_angle_at_optimal=0.2268928
              PathPoint P1: tibia_l (0.000988523 -0.2771818 -0.02283488)
              PathPoint P2: tibia_l (0.02263718 -0.40223 -0.01571752)
              PathPoint P3: calcn_l (0.08802044 0.02341734 -0.03070958)
            DeGrooteFregly2016Muscle ext_dig_l: max_isometric_force=512 optimal_fiber_length=0.1026945
                tendon_slack_length=0.3473491 pennation_angle_at_optimal=0.1396263
              PathPoint P1: tibia_l (0.003163274 -0.136515 -0.02728323)
              PathPoint P2: tibia_l (0.02856831 -0.3961012 -0.007117366)
              PathPoint P3: calcn_l (0.09469643 0.03985056 0.0001027076)
              PathPoint P4: calcn_l (0.1659755 0.005648919 -0.01335199)
              PathPoint P5: toes_l (0.0003081229 0.004827258 -0.01571427)
              PathPoint P6: toes_l (0.04549948 -0.0004108305 -0.02567691)
            DeGrooteFregly2016Muscle ext_hal_l: max_isometric_force=162 optimal_fiber_length=0.1119451
                tendon_slack_length=0.3075968 pennation_angle_at_optimal=0.1047198
              PathPoint P1: tibia_l (0.001186228 -0.174672 -0.02253832)
              PathPoint P2: tibia_l (0.03222585 -0.3939264 0.008402446)
              PathPoint P3: calcn_l (0.0996264 0.03995327 0.02167131)
              PathPoint P4: calcn_l (0.132801 0.03173666 0.02639586)
              PathPoint P5: calcn_l (0.178095 0.01427636 0.02875814)
              PathPoint P6: toes_l (0.03060687 0.004211013 0.02516337)
              PathPoint P7: toes_l (0.05782439 0.003492059 0.01910362)
            DeGrooteFregly2016Muscle ercspn_r: max_isometric_force=2500 optimal_fiber_length=0.1278913
                tendon_slack_length=0.03197282 pennation_angle_at_optimal=0
              PathPoint P1: pelvis (-0.143451 0.04498213 0.04467473)
              PathPoint P2: torso (-0.05938726 0.1187745 0.02602242)
            DeGrooteFregly2016Muscle ercspn_l: max_isometric_force=2500 optimal_fiber_length=0.1278913
                tendon_slack_length=0.03197282 pennation_angle_at_optimal=0
              PathPoint P1: pelvis (-0.143451 0.04498213 -0.04467473)
              PathPoint P2: torso (-0.05938726 0.1187745 -0.02602242)
            DeGrooteFregly2016Muscle intobl_r: max_isometric_force=900 optimal_fiber_length=0.1062076
                tendon_slack_length=0.1062076 pennation_angle_at_optimal=0
              PathPoint P1: pelvis (-0.04098599 0.07172549 0.118552)
              PathPoint P2: torso (0.07558379 0.1727629 0.01619653)
            DeGrooteFregly2016Muscle intobl_l: max_isometric_force=900 optimal_fiber_length=0.1062076
                tendon_slack_length=0.1062076 pennation_angle_at_optimal=0
              PathPoint P1: pelvis (-0.04098599 0.07172549 -0.118552)
              PathPoint P2: torso (0.07558379 0.1727629 -0.01619653)
            DeGrooteFregly2016Muscle extobl_r: max_isometric_force=900 optimal_fiber_length=0.1263847
                tendon_slack_length=0.1474489 pennation_angle_at_optimal=0
              PathPoint P1: pelvis (-0.03073949 -0.06516773 0.0102465)
              PathPoint P2: torso (0.07018494 0.1187745 0.1187745)
            DeGrooteFregly2016Muscle extobl_l: max_isometric_force=900 optimal_fiber_length=0.1263847
                tendon_slack_length=0.1474489 pennation_angle_at_optimal=0
              PathPoint P1: pelvis (-0.03073949 -0.06516773 -0.0102465)
              PathPoint P2: torso (0.07018494 0.1187745 -0.1187745)
            CoordinateActuator knee_exo_device: min_control=-2 max_control=2 coordinate=knee_angle_r optimal_force=100
            CoordinateActuator reserve_jointset_ground_pelvis_pelvis_tilt: coordinate=pelvis_tilt optimal_force=100
            CoordinateActuator reserve_jointset_ground_pelvis_pelvis_list: coordinate=pelvis_list optimal_force=100
            CoordinateActuator reserve_jointset_ground_pelvis_pelvis_rotation: coordinate=pelvis_rotation
                optimal_force=100
            CoordinateActuator reserve_jointset_ground_pelvis_pelvis_tx: coordinate=pelvis_tx optimal_force=100
            CoordinateActuator reserve_jointset_ground_pelvis_pelvis_ty: coordinate=pelvis_ty optimal_force=100
            CoordinateActuator reserve_jointset_ground_pelvis_pelvis_tz: coordinate=pelvis_tz optimal_force=100
            CoordinateActuator reserve_jointset_hip_r_hip_flexion_r: coordinate=hip_flexion_r optimal_force=100
            CoordinateActuator reserve_jointset_hip_r_hip_adduction_r: coordinate=hip_adduction_r optimal_force=100
            CoordinateActuator reserve_jointset_hip_r_hip_rotation_r: coordinate=hip_rotation_r optimal_force=100
            CoordinateActuator reserve_jointset_ankle_r_ankle_angle_r: coordinate=ankle_angle_r optimal_force=100
            CoordinateActuator reserve_jointset_subtalar_r_subtalar_angle_r: coordinate=subtalar_angle_r
                optimal_force=100
            CoordinateActuator reserve_jointset_mtp_r_mtp_angle_r: coordinate=mtp_angle_r optimal_force=100
            CoordinateActuator reserve_jointset_hip_l_hip_flexion_l: coordinate=hip_flexion_l optimal_force=100
            CoordinateActuator reserve_jointset_hip_l_hip_adduction_l: coordinate=hip_adduction_l optimal_force=100
            CoordinateActuator reserve_jointset_hip_l_hip_rotation_l: coordinate=hip_rotation_l optimal_force=100
            CoordinateActuator reserve_jointset_knee_l_knee_angle_l: coordinate=knee_angle_l optimal_force=100
            CoordinateActuator reserve_jointset_ankle_l_ankle_angle_l: coordinate=ankle_angle_l optimal_force=100
            CoordinateActuator reserve_jointset_subtalar_l_subtalar_angle_l: coordinate=subtalar_angle_l
                optimal_force=100
            CoordinateActuator reserve_jointset_mtp_l_mtp_angle_l: coordinate=mtp_angle_l optimal_force=100
            CoordinateActuator reserve_jointset_back_lumbar_extension: coordinate=lumbar_extension optimal_force=100
            CoordinateActuator reserve_jointset_back_lumbar_bending: coordinate=lumbar_bending optimal_force=100
            CoordinateActuator reserve_jointset_back_lumbar_rotation: coordinate=lumbar_rotation optimal_force=100
            ObjectGroup R_hip_abd
            ObjectGroup R_hip_flex
            ObjectGroup R_hip_inrot
            ObjectGroup R_hip_exrot
            ObjectGroup R_hip_ext
            ObjectGroup R_hip_add
            ObjectGroup R_knee_bend
            ObjectGroup R_knee_ext
            ObjectGroup R_ankle_pf
            ObjectGroup R_inverter
            ObjectGroup R_ankle_df
            ObjectGroup R_everter
            ObjectGroup L_hip_abd
            ObjectGroup L_hip_flex
            ObjectGroup L_hip_inrot
            ObjectGroup L_hip_exrot
            ObjectGroup L_hip_ext
            ObjectGroup L_hip_add
            ObjectGroup L_knee_bend
            ObjectGroup L_knee_ext
            ObjectGroup L_ankle_pf
            ObjectGroup L_inverter
            ObjectGroup L_ankle_df
            ObjectGroup L_everter
            ObjectGroup back_ext
            ObjectGroup back_rlb
            ObjectGroup back_introt
            ObjectGroup back_llb
            ObjectGroup back_extrot
            ObjectGroup back_flex
          MarkerSet:
            Marker Sternum: torso (0.1186322 0.3075897 0.001435109)
            Marker R.Acromium: torso (-0.004354827 0.4267877 0.1711944)
            Marker L.Acromium: torso (-0.002428956 0.4421516 -0.1696668)
            Marker Top.Head: torso (0.09208781 0.6956841 0.01302031)
            Marker R.ASIS: pelvis (0.02375694 0.03659012 0.1306904)
            Marker L.ASIS: pelvis (0.02828115 0.02797939 -0.1314208)
            Marker V.Sacral: pelvis (-0.1724413 0.03962323 0.00722255)
            Marker R.Thigh.Upper: femur_r (0.04668857 -0.2200896 0.09182577)
            Marker R.Thigh.Front: femur_r (0.1086919 -0.2818038 -0.0007320719)
            Marker R.Thigh.Rear: femur_r (0.03567501 -0.3407103 0.08187979)
            Marker R.Knee.Lat: femur_r (-0.003389454 -0.4260593 0.06139967)
            Marker R.Knee.Med: femur_r (0.0003672325 -0.4429641 -0.05968766)
            Marker R.Shank.Upper: tibia_r (-0.02754143 -0.05983067 0.07020395)
            Marker R.Shank.Front: tibia_r (0.05084458 -0.09528228 0.0197502)
            Marker R.Shank.Rear: tibia_r (-0.01149063 -0.1452782 0.08031047)
            Marker R.Ankle.Lat: tibia_r (-0.007484044 -0.4305822 0.05553135)
            Marker R.Ankle.Med: tibia_r (0.004626422 -0.4161543 -0.0333144)
            Marker R.Heel: calcn_r (-0.02028952 0.01722841 -0.005516859)
            Marker R.Midfoot.Sup: calcn_r (0.1227192 0.03342579 -0.04041321)
            Marker R.Midfoot.Lat: calcn_r (0.1182589 0.006483246 0.06539887)
            Marker R.Toe.Lat: calcn_r (0.2089007 -0.01647739 0.07281222)
            Marker R.Toe.Med: calcn_r (0.2097723 0.003334991 -0.03456451)
            Marker R.Toe.Tip: calcn_r (0.2709453 0.003311762 -0.003194844)
            Marker L.Thigh.Upper: femur_l (0.02285663 -0.2067375 -0.0973007)
            Marker L.Thigh.Front: femur_l (0.1108835 -0.2489554 -0.03402764)
            Marker L.Thigh.Rear: femur_l (0.01534522 -0.3154243 -0.08245166)
            Marker L.Knee.Lat: femur_l (-0.008631356 -0.4457132 -0.06424916)
            Marker L.Knee.Med: femur_l (0.008711511 -0.445915 0.05074603)
            Marker L.Shank.Upper: tibia_l (-0.00632706 -0.07147914 -0.07949358)
            Marker L.Shank.Front: tibia_l (0.04517131 -0.1215396 -0.03086883)
            Marker L.Shank.Rear: tibia_l (-0.02459843 -0.11447 -0.08803328)
            Marker L.Ankle.Lat: tibia_l (-0.003691505 -0.4283662 -0.05720338)
            Marker L.Ankle.Med: tibia_l (0.01296239 -0.4053658 0.03274166)
            Marker L.Heel: calcn_l (-0.02249979 0.0264526 0.006172816)
            Marker L.Midfoot.Sup: calcn_l (0.1493415 0.03649508 0.0347228)
            Marker L.Midfoot.Lat: calcn_l (0.1335207 0.01779444 -0.06207991)
            Marker L.Toe.Lat: calcn_l (0.1964435 -0.006602498 -0.06716189)
            Marker L.Toe.Med: calcn_l (0.2115479 0.01316243 0.03323564)
            Marker L.Toe.Tip: calcn_l (0.2614247 0.01004974 0.009348427)
          ComponentSet:
            ExternalLoads: datafile=(C:\OpenSim 4.5\sdk\Models\DropFoot_GaitRehab_FESRobex\Gaithab_FesRobex_project_22.12.25\MATLAB\Open-Loop Model\Moco_Phase4_Adult_Normal\01_Inputs\subject01_walk1_grf.mot)
              ExternalForce ExternalForce_1: applied_to_body=calcn_r force_expressed_in_body=ground
                  point_expressed_in_body=ground force_identifier=ground_force_v point_identifier=ground_force_p
                  torque_identifier=ground_torque_ data_source_name=subject01_walk1_grf.mot
              ExternalForce ExternalForce_2: applied_to_body=calcn_l force_expressed_in_body=ground
                  point_expressed_in_body=ground force_identifier=1_ground_force_v point_identifier=1_ground_force_p
                  torque_identifier=1_ground_torque_ data_source_name=subject01_walk1_grf.mot
      MocoInitialBounds time_initial_bounds: bounds=0.4
      MocoFinalBounds time_final_bounds: bounds=1.75
      goals:
        MocoControlGoal excitation_effort:
          MocoWeightSet control_weights_pattern:
            MocoWeight .*/reserve_.*: weight=1
        MocoInitialActivationGoal initial_activation
  MocoCasADiSolver solver:
    num_mesh_intervals: 27
    interpolate_control_midpoints: false
    multibody_dynamics_mode: implicit
    optim_convergence_tolerance: 0.01
    optim_constraint_tolerance: 0.01
    optim_sparsity_detection: random
    optim_finite_difference_scheme: forward
    minimize_implicit_auxiliary_derivatives: true
    implicit_auxiliary_derivatives_weight: 0.01
